Simulations: Version=219
  Memo TitlePage
    # LifeCycle example
  DataStore
  Simulation PsyllidTest
    Memo
      #The Dymex Pseudo Aphid Tutorials

      This is a direct copy of the Dymex tutorial and development of a pseudo Aphid model:

      **Dymex v2. Insect Tutorial. https://www.hearne.software/getattachment/0ca7c91f-dbe6-4765-8207-4e1b3f1591f2/Insect-Tutorial.aspx. Accessed 1/4/2019.**

      Tutorial_1_1_PseudoAphid_AgeBasedDevt (Dymex tutorial 1 Introduction)

      Tutorial_1_2_PseudoAphid_AgeBasedDevtResults (exploring options to graph results in ApsimX using results from Tutorial_1_1)

      Tutorial_2_1_PseudoAphid_ConstantMetTempDevt (Dymex tutorial 2 Temperature-dependent Development)

      Tutorial_2_2_PseudoAphid_ConstantTempDevt (exploring other options in ApsimX to set a constant temperature)

      Tutorial_2_3_PseudoAphid_MeanFieldTempDevt (Dymex tutorial 3 Changing to Field Temperatures)

      Tutorial_3_1_PseudoAphid_DegreeDayDevt (Dymex tutorial 4 Degree Days)

      Tutorial_4_1_PseudoAphid_3HrlyDevt (exploring the ApsimX capability to simulate degree days based on three-hourly intervals)

      Tutorial_5_1_PseudoAphid_TempDepMortality (Dymex tutorial 5 Mortality)

      Tutorial_6_1_PseudoAphid_DensityDepMortality (Dymex tutorial 6 Density-dependent Mortality)

      Tutorial_7_1_PseudoAphid_DrynessDepMortality (Dymex tutorial 7 Dryness Dependent Mortality)

      Tutorial_8_1_PseudoAphid_DrynessDepMortalitySoil (Dymex tutorial 8 Dryness Dependent Mortality using Soil Moisture)

      In Dymex tutorials 9 and 10, management operations are added to the simulations to spray the PseudoAphids. These tutorials have not been rebuilt here since ApsimX provides for spraying as part of manangement activities that can be applied in any ApsimX simulation.

      Notes are from the Dymex manual and adjusted to describe the processes required in the APSIM population model builder.

      **Each tutorial builds upon the previous one.**

      Unlike Dymex, APSIM provides timing models, climate models, and reporting models so none of these need to be created by the user. However, the model set up described in this section is requred for this and successive tutorials.

      #Tutorial_1_1_PseudoAphid Age Based Development

      This tutorial is the first in the series for modelling the lifecycle of a pseudoaphid.

      In Tutorial_1_1, ApsimX is set up to simulate an insect population for one year. A lifecycle is established that includes a single Juvenile stage that is transferred to an adult stage after ten days. The adult stage is set up with simple mortality and reproduction functions. In this tutorial, all adults die after twenty days. The reproduction function for adults allows all adults to reproduce at a fixed rate after a fixed time.

      **Clock**

      Start simulation = **01/01/2016**;
      End simulation   = **31/12/2016**

      **Weather file**

      Select the example met file = **Normal.met**

      **Summary file**

      This file provides a summary of the simulation output processes after the simulation has been run.

      **Adding and building a report**

      Add a report to hold the results of your simulation.

      To do this, go to the FIELD object, right click and select **add Model > Report**

      For many simulations, changes in results over time is of interest. To add a time component to your report, go to the **Report module** and Type "[#Clock]." *(be sure to include the full stop after the closing square bracket)*. Options will appear - select "Today" to report today's date.

      Another useful time component to add to your report is the day of the year. To so this in the Report module, Type "[#Clock]." *(be sure to include the full stop after the closing square bracket)*. Options will appear - select "Today". and then type another "." full stop. More options will appear and scroll down to "DayOfYear" to report the Julian day.
    Memo Memo1
      #Tutorial 1_1 Summary

      **Clock**

      Start date 1/1/2016

      End date 31/12/2016

      ***Lifecycle***

      **Juvenile**

      Transfer to adult function (Step)

      Driving variable: Chronological Age

      Transfer threshold: 10 days

      Prop.juveniles transferring: 1

      **Adults**

      Continuous mortality function (step)

      Driving variable: Chronological age

      Threshold: 20 days

      Prop. adults dying: 1

      *Reproduction*

      Fecundity:

      Constant: 5 juveniles per adult

      Progeny Production (Linear above Threshold)

      Driving variable: Chronological Age

      Threshold: 8 days

      Slope: 0.2
    Clock: Start=2016-10-01; End=2017-05-31
    Summary SummaryFile
    Weather: FileName=C:/Repos/ApsimX/Tests/Validation/Wheat/met/lincoln.met
    MicroClimate: a_interception=0; b_interception=1; c_interception=0; d_interception=0; SoilHeatFluxFraction=0.4; MinimumHeightDiffForNewLayer=0; NightInterceptionFraction=0.5; ReferenceHeight=2
    SoilArbitrator
    Zone Field: Area=1; Slope=0; AspectAngle=0; Altitude=50
      Report: EventNames=[Clock].DoReport
        VariableNames:
          [Clock].Today
          [Clock].Today.DayOfYear
          [TomatoPotatoPsyllid].Egg.TotalPopulation
          [TomatoPotatoPsyllid].1stInstar.TotalPopulation
          [TomatoPotatoPsyllid].2ndInstar.TotalPopulation
          [TomatoPotatoPsyllid].3rdInstar.TotalPopulation
          [TomatoPotatoPsyllid].4thInstar.TotalPopulation
          [TomatoPotatoPsyllid].5thInstar.TotalPopulation
          [TomatoPotatoPsyllid].Adult.TotalPopulation
          [Potato].Leaf.Live.Wt
      Fertiliser
      Soil: ASCOrder=Vertosol; ASCSubOrder=Black; SoilType=Clay; Site=Norwin; NearestTown=Norwin; Region=Darling Downs and Granite Belt; State=Queensland; Country=Australia; NaturalVegetation=Qld. Bluegrass, possible Qld. Blue gum; ApsoilNumber=900; Latitude=-27.581836; Longitude=151.320206; LocationAccuracy=+/- 20m
        DataSource=CSIRO Sustainable Ecosystems, Toowoomba; Characteriesd as part of the GRDC funded project"Doing it better, doing it smarter, managing soil water in Australian agriculture' 2011
        Comments=OC, CLL for all crops estimated-based on Bongeen Mywybilla Soil No1
        Physical
          Thickness  BD       AirDry    LL15      DUL       SAT       KS
          150        1.01056  0.13025   0.2605    0.521     0.588655  20
          150        1.07146  0.198689  0.248362  0.496723  0.565677  20
          300        1.09394  0.28      0.28      0.488438  0.557193  20
          300        1.15861  0.28      0.28      0.480297  0.532787  20
          300        1.17301  0.28      0.28      0.471584  0.527354  20
          300        1.16287  0.28      0.28      0.457071  0.53118   20
          300        1.1875   0.28      0.28      0.452332  0.521888  20
          SoilCrop PotatoSoil: LL=[0.261, 0.248, 0.28, 0.306, 0.36, 0.392, 0.446]; KL=[0.06, 0.06, 0.06, 0.04, 0.04, 0.02, 0.01]; XF=[1, 1, 1, 1, 1, 1, 1]
        WaterBalance SoilWater: SummerDate=1-Nov; SummerU=5; SummerCona=5; WinterDate=1-Apr; WinterU=5; WinterCona=5; DiffusConst=40; DiffusSlope=16; Salb=0.12; CN2Bare=73; CNRed=20; CNCov=0.8; PSIDul=-100; Thickness=[150, 150, 300, 300, 300, 300, 300]; SWCON=[0.3, 0.3, 0.3, 0.3, 0.3, 0.3, 0.3]
        Organic: FOMCNRatio=40; CarbonUnits=Total
          Thickness  Carbon  SoilCNRatio  FBiom  FInert  FOM
          150        1.2     12           0.04   0.4     347.129
          150        0.96    12           0.02   0.6     270.344
          300        0.6     12           0.02   0.8     163.972
          300        0.3     12           0.02   1       99.4541
          300        0.18    12           0.01   1       60.322
          300        0.12    12           0.01   1       36.5871
          300        0.12    12           0.01   1       22.1912
        Chemical: Thickness=[150, 150, 300, 300, 300, 300, 300]; PH=[8, 8, 8, 8, 8, 8, 8]; PHUnits=Water
        Water: Thickness=[150, 150, 300, 300, 300, 300, 300]; FilledFromTop=false
          InitialValues=[0.521, 0.496723, 0.488438, 0.480297, 0.471584, 0.457071, 0.452332]
        Nutrient
        Solute NO3: Thickness=[150, 150, 300, 300, 300, 300, 300]; InitialValues=[1, 1, 1, 1, 1, 1, 1]; InitialValuesUnits=ppm; WaterTableConcentration=0; D0=0; DepthConstant=0; MaxDepthSoluteAccessible=0; RunoffEffectivenessAtMovingSolute=0; MaxEffectiveRunoff=0
        Solute NH4: Thickness=[150, 150, 300, 300, 300, 300, 300]; InitialValues=[0.1, 0.1, 0.1, 0.1, 0.1, 0.1, 0.1]; InitialValuesUnits=ppm; WaterTableConcentration=0; D0=0; DepthConstant=0; MaxDepthSoluteAccessible=0; RunoffEffectivenessAtMovingSolute=0; MaxEffectiveRunoff=0
        Solute Urea: Thickness=[150, 150, 300, 300, 300, 300, 300]; InitialValues=[0, 0, 0, 0, 0, 0, 0]; InitialValuesUnits=kg/ha; WaterTableConcentration=0; D0=0; DepthConstant=0; MaxDepthSoluteAccessible=0; RunoffEffectivenessAtMovingSolute=0; MaxEffectiveRunoff=0
        SoilTemperature Temperature: InteractionsPerDay=8
      SurfaceOrganicMatter: InitialResidueName=wheat_stubble; InitialResidueType=wheat; InitialResidueMass=500; InitialStandingFraction=0; InitialCPR=0; InitialCNR=100
      Manager PlantandHarvest
        PlantingDate = 10/20/2016 00:00:00
        CultivarName = RussetBurbank
        RowSpace = 280
        RowWidth = 770
        PlantingDepth = 120
        StemNumberPerSeedTuber = 2.2
        SetFinalLeafNumber = 0
        HarvestDate = 06/01/2004 00:00:00
```csharp
using APSIM.Core;
using Newtonsoft.Json;
using Models.PMF.Struct;
using System;
using Models.Core;
using Models.PMF;
using APSIM.Shared.Utilities;
using System.Xml.Serialization;
using Models.PMF.Phen;
using Models.Soils;
        
namespace Models
{
    [Serializable] 
    [System.Xml.Serialization.XmlInclude(typeof(Model))]
    public class Script : Model, IStructureDependency
    {
        [Link] private Plant Potato;
        [Link] private Clock Clock;
        [Link] private Zone zone;
        [Link] private Summary Summary;
        [Link(Type = LinkType.Path, Path = "[Potato].Structure")]
        private Structure structure;
        [Link(Type = LinkType.Path, Path = "[Potato].Phenology")]
        private Phenology phenology;
        public IStructure Structure { private get; set; }
        
        [Description("Planting Date")]
        public DateTime PlantingDate { get; set; }
        [Description("Cultivar")]
        [Display(Type=DisplayType.CultivarName)]
        public string CultivarName { get; set; }
        [Description("Spacing (mm) between plants within rows")]
        public double RowSpace { get; set; }
        [Description("Spacing (mm) between rows")]
        public double RowWidth { get; set; }
        [Description("Depth (mm) tubers are planted")]
        public double PlantingDepth { get; set; }
        [Description("Number of stems per seed tuber")]
        public double StemNumberPerSeedTuber { get; set; }
        [Description("Final leaf number.  Leave at 0 if not known")]
        public double SetFinalLeafNumber { get; set; }
        [Description("HarvestDate Date")]
        public DateTime HarvestDate { get; set; }
        
        [JsonIgnore] public string FinalTag { get; set; }
        [JsonIgnore] public bool Harvested { get; set; }
        [JsonIgnore] public bool ReadyForHarvest { get; set; }
        
        

        

        [EventSubscribe("StartOfSimulation")]
        private void OnSimulationCommencing(object sender, EventArgs e)
        {
            FinalTag = "";
            Harvested = false;
            ReadyForHarvest = false;
        }
        
        [EventSubscribe("DoManagement")]
        private void OnDoManagement(object sender, EventArgs e)
        {
            double PlantPopulation = 1 / ((RowWidth / 1000) * (RowSpace / 1000));

            if (Clock.Today.Date == PlantingDate)
                Potato.Sow(population: PlantPopulation, cultivar: CultivarName, depth: PlantingDepth, rowSpacing: 150, budNumber: StemNumberPerSeedTuber);
            
            if (ReadyForHarvest == true)
            {
                Potato.Harvest();
                Potato.EndCrop();
                ReadyForHarvest = false;
                Harvested = true;
                Summary.WriteMessage(this, "is working", MessageType.Diagnostic);
            }
            FinalTag = "";   
            
            if (SetFinalLeafNumber > 0)
                Structure.Set("Potato.Structure.FinalLeafNumber.FixedValue", SetFinalLeafNumber, relativeTo: zone);
            if (SetFinalLeafNumber > 80)
                Summary.WriteMessage(this, "Model is producing > 80 leaves which is guite alot.  Is this expected?  If not check you haven't set a invalid number in the Final Leaf Number box in" + this.Name, MessageType.Warning);
        }
        
        [EventSubscribe("DoManagementCalculations")]
        private void OnDoManagementCalculations(object sender, EventArgs e)
        {
            if ((Clock.Today == HarvestDate) && (Harvested == false))
            {
                FinalTag = "yield";
                ReadyForHarvest = true;
            }
            //if ((phenology.Stage >= 7) && (Harvested == false))
            //{
            //    FinalTag = "yield";
            //    ReadyForHarvest = true;
            //}
        }
    }
}
```
      Plant Potato
      Infestation: TypeOfInfestation=1; InfestingOrganisumName=TomatoPotatoPsyllid; InfestingPhaseName=Adult; InfestationDate=15-Nov; ChronoAgeOfImmigrants=0; PhysAgeOfImmigrants=0.2
        Constant NumberOfImmigrants: FixedValue=100
      LifeCycle TomatoPotatoPsyllid
        Memo
          ***Adding a Life Cycle***

          The first step in building a population model is to build the LifeCycle.

          To do this, go to the FIELD object, right click and select **Add Model > LifeCycle**

          ***Initiating the LifeCycle Model***

          The initial populations of all stages of individuals needs to be initiated with some individuals.

          This is done at the **LifeCycle** level.

          Select the LifeCycle model and then for "Initial population at each LifeStage" enter **"1,0"** for the two LifeStages (Juvenile and Adult) that we are using in our example, i.d., we have 1 juvenile and 0 adults.

          ***Adding a Life Stage***

          The LifeStage icon represents one LifeStage of the species being modelled.  A number of
          environmental factors (eg. temperature, moisture, predators, availability of food, diseases,
          etc.) influence the species’ rate of development, survival and reproduction.  The LifeCycle model can be
          set to simulate these processes by adding functions to the LifeStage, each of which
          controls some aspect of the LifeStage.

          Each LifeStage defines a particular stage (eg. egg, pupa, adult, etc.) together with its
          environment and attributes.  The number of stages is set by the user.

          For the PseudoAphid two stages are required (juvenile and adult); however several stages could be used depending
          upon the detail required by the model or the life cycle of the organism.  Many insects may
          require a number of LifeStages depending upon the instars that are present.  For example, a
          model of a tree fern would probably include stages corresponding to spore, gametophyte,
          gamete and sporophyte.  However, it is conceivable that a user may wish to condense two of
          these three stages into one for a particular model and might end up with the three stages of
          spore, gametophyte-gamete and sporophyte.  Exactly how the model is constructed depends
          completely on the requirements and applications of the user.

          **To add a LifeStage to the life cycle** right click on the LifeCycle and select **Add model > select LifeStage**.

          For this tutorial:

          Add a lifstage and rename it to **Juvenile**.

          Add a second LifeStage and rename to **Adult**.
        LifeCyclePhase Egg: Immigrants=0; DevelopmentRate=0; Mortalities=0; Graduates=0; Progeny=0; Emigrants=0
          DivideFunction Development
            SubDailyInterpolation TemperatureResponse: agregationMethod=0
              XYPairs Response: X=[0, 15, 27, 32]; Y=[0, 0, 1, 0]
              ThreeHourAirTemperature InterpolationMethod
            Constant DurationAtOptTemp: FixedValue=2; Units=individuals /d
          MultiplyFunction Mortality
            VariableReference CohortPopulation: VariableName=[Egg].CurrentCohort.Population
            Constant MortanityRate: FixedValue=0.01; Units=individuals / population
            SubDailyInterpolation TemperatureResponse: agregationMethod=0
              XYPairs Response: X=[-30, -25, 30, 35]; Y=[1, 0, 0, 1]
              ThreeHourAirTemperature InterpolationMethod
          Constant Reproduction: FixedValue=0; Units=individuals /d
          Constant Migration: FixedValue=0; Units=individuals /d
        LifeCyclePhase 1stInstar: Immigrants=0; DevelopmentRate=0; Mortalities=0; Graduates=0; Progeny=0; Emigrants=0
          DivideFunction Development
            SubDailyInterpolation TemperatureResponse: agregationMethod=0
              XYPairs Response: X=[0, 15, 27, 32]; Y=[0, 0, 1, 0]
              ThreeHourAirTemperature InterpolationMethod
            Constant DurationAtOptTemp: FixedValue=2; Units=individuals /d
          MultiplyFunction Mortality
            VariableReference CohortPopulation: VariableName=[1stInstar].CurrentCohort.Population
            Constant MortanityRate: FixedValue=0.01; Units=individuals / population
          Constant Reproduction: FixedValue=0; Units=individuals /d
          Constant Migration: FixedValue=0; Units=individuals /d
        LifeCyclePhase 2ndInstar: Immigrants=0; DevelopmentRate=0; Mortalities=0; Graduates=0; Progeny=0; Emigrants=0
          DivideFunction Development: same as PsyllidTest.Field.TomatoPotatoPsyllid.1stInstar.Development
          MultiplyFunction Mortality
            VariableReference CohortPopulation: VariableName=[2ndInstar].CurrentCohort.Population
            Constant MortanityRate: FixedValue=0.01; Units=individuals / population
          Constant Reproduction: FixedValue=0; Units=individuals /d
          Constant Migration: FixedValue=0; Units=individuals /d
        LifeCyclePhase 3rdInstar: Immigrants=0; DevelopmentRate=0; Mortalities=0; Graduates=0; Progeny=0; Emigrants=0
          DivideFunction Development: same as PsyllidTest.Field.TomatoPotatoPsyllid.1stInstar.Development
          MultiplyFunction Mortality
            VariableReference CohortPopulation: VariableName=[3rdInstar].CurrentCohort.Population
            Constant MortanityRate: FixedValue=0.01; Units=individuals / population
          Constant Reproduction: FixedValue=0; Units=individuals /d
          Constant Migration: FixedValue=0; Units=individuals /d
        LifeCyclePhase 4thInstar: Immigrants=0; DevelopmentRate=0; Mortalities=0; Graduates=0; Progeny=0; Emigrants=0
          DivideFunction Development: same as PsyllidTest.Field.TomatoPotatoPsyllid.1stInstar.Development
          MultiplyFunction Mortality
            VariableReference CohortPopulation: VariableName=[4thInstar].CurrentCohort.Population
            Constant MortanityRate: FixedValue=0.01; Units=individuals / population
          Constant Reproduction: FixedValue=0; Units=individuals /d
          Constant Migration: FixedValue=0; Units=individuals /d
        LifeCyclePhase 5thInstar: Immigrants=0; DevelopmentRate=0; Mortalities=0; Graduates=0; Progeny=0; Emigrants=0
          DivideFunction Development: same as PsyllidTest.Field.TomatoPotatoPsyllid.1stInstar.Development
          MultiplyFunction Mortality
            VariableReference CohortPopulation: VariableName=[5thInstar].CurrentCohort.Population
            Constant MortanityRate: FixedValue=0.01; Units=individuals / population
          Constant Reproduction: FixedValue=0; Units=individuals /d
          Constant Migration: FixedValue=0; Units=individuals /d
        LifeCyclePhase Adult: Immigrants=0; DevelopmentRate=0; Mortalities=0; Graduates=0; Progeny=0; Emigrants=0
          DivideFunction Development
            SubDailyInterpolation TemperatureResponse: agregationMethod=0
              XYPairs Response: X=[0, 15, 27, 32]; Y=[0, 0, 1, 0]
              ThreeHourAirTemperature InterpolationMethod
            Constant DurationAtOptTemp: FixedValue=5; Units=individuals /d
          MultiplyFunction Mortality
            VariableReference CohortPopulation: VariableName=[Adult].CurrentCohort.Population
            Constant MortanityRate: FixedValue=0.01; Units=individuals / population
          MultiplyFunction Reproduction
            VariableReference CohortPopulation: VariableName=[Adult].CurrentCohort.Population
            LinearInterpolationFunction Maturity
              XYPairs: X=[0, 0.3, 0.5, 0.8, 0.9, 1]; Y=[0, 0, 1, 1, 0, 0]
              VariableReference XValue: VariableName=[Adult].CurrentCohort.PhysiologicalAge
            Constant DailyLayingRate: FixedValue=0.5; Units=individuals / population
          ProgenyDestinationPhase: NameOfLifeCycleForProgeny=TomatoPotatoPsyllid; NameOfPhaseForProgeny=Egg
          Constant Migration: FixedValue=0; Units=individuals /d
    Memo Memo2
      ------
  Simulation MultiPopnTest
    Memo: same as PsyllidTest.Memo
    Memo Memo1: same as PsyllidTest.Memo1
    Clock: Start=2016-10-01; End=2017-05-31
    Summary SummaryFile
    Weather: FileName=%root%/Tests/Validation/Wheat/lincoln.met
    MicroClimate: a_interception=0; b_interception=1; c_interception=0; d_interception=0; SoilHeatFluxFraction=0.4; MinimumHeightDiffForNewLayer=0; NightInterceptionFraction=0.5; ReferenceHeight=2
    SoilArbitrator
    Zone Field: Area=1; Slope=0; AspectAngle=0; Altitude=50
      Report: EventNames=[Clock].DoReport
        VariableNames:
          [Clock].Today
          [Clock].Today.DayOfYear
          [TomatoPotatoPsyllid].Egg.TotalPopulation
          [TomatoPotatoPsyllid].1stInstar.TotalPopulation
          [TomatoPotatoPsyllid].2ndInstar.TotalPopulation
          [TomatoPotatoPsyllid].3rdInstar.TotalPopulation
          [TomatoPotatoPsyllid].4thInstar.TotalPopulation
          [TomatoPotatoPsyllid].5thInstar.TotalPopulation
          [TomatoPotatoPsyllid].Adult.TotalPopulation
          [ResistantTomatoPotatoPsyllid].Egg.TotalPopulation
          [ResistantTomatoPotatoPsyllid].1stInstar.TotalPopulation
          [ResistantTomatoPotatoPsyllid].2ndInstar.TotalPopulation
          [ResistantTomatoPotatoPsyllid].3rdInstar.TotalPopulation
          [ResistantTomatoPotatoPsyllid].4thInstar.TotalPopulation
          [ResistantTomatoPotatoPsyllid].5thInstar.TotalPopulation
          [ResistantTomatoPotatoPsyllid].Adult.TotalPopulation
      Fertiliser
      Soil: same as PsyllidTest.Field.Soil
      SurfaceOrganicMatter: InitialResidueName=wheat_stubble; InitialResidueType=wheat; InitialResidueMass=500; InitialStandingFraction=0; InitialCPR=0; InitialCNR=100
      Manager PlantandHarvest
        PlantingDate = 10/20/2003 00:00:00
        CultivarName = RussetBurbank
        RowSpace = 280
        RowWidth = 770
        PlantingDepth = 120
        StemNumberPerSeedTuber = 2.2
        SetFinalLeafNumber = 0
        HarvestDate = 06/01/2004 00:00:00
        script: same as in PsyllidTest.Field.PlantandHarvest
      Plant Potato
      Infestation: same as PsyllidTest.Field.Infestation
      LifeCycle TomatoPotatoPsyllid
        Memo: same as PsyllidTest.Field.TomatoPotatoPsyllid.Memo
        LifeCyclePhase Egg: Immigrants=0; DevelopmentRate=0; Mortalities=0; Graduates=0; Progeny=0; Emigrants=0
          DivideFunction Development: same as PsyllidTest.Field.TomatoPotatoPsyllid.1stInstar.Development
          MultiplyFunction Mortality
            VariableReference CohortPopulation: VariableName=[TomatoPotatoPsyllid].Egg.CurrentCohort.Population
            Constant MortanityRate: FixedValue=0.01; Units=individuals / population
          Constant Reproduction: FixedValue=0; Units=individuals /d
          Constant Migration: FixedValue=0; Units=individuals /d
        LifeCyclePhase 1stInstar: Immigrants=0; DevelopmentRate=0; Mortalities=0; Graduates=0; Progeny=0; Emigrants=0
          DivideFunction Development: same as PsyllidTest.Field.TomatoPotatoPsyllid.1stInstar.Development
          MultiplyFunction Mortality
            VariableReference CohortPopulation: VariableName=[TomatoPotatoPsyllid].1stInstar.CurrentCohort.Population
            Constant MortanityRate: FixedValue=0.01; Units=individuals / population
          Constant Reproduction: FixedValue=0; Units=individuals /d
          Constant Migration: FixedValue=0; Units=individuals /d
        LifeCyclePhase 2ndInstar: Immigrants=0; DevelopmentRate=0; Mortalities=0; Graduates=0; Progeny=0; Emigrants=0
          DivideFunction Development: same as PsyllidTest.Field.TomatoPotatoPsyllid.1stInstar.Development
          MultiplyFunction Mortality
            VariableReference CohortPopulation: VariableName=[TomatoPotatoPsyllid].2ndInstar.CurrentCohort.Population
            Constant MortanityRate: FixedValue=0.01; Units=individuals / population
          Constant Reproduction: FixedValue=0; Units=individuals /d
          Constant Migration: FixedValue=0; Units=individuals /d
        LifeCyclePhase 3rdInstar: Immigrants=0; DevelopmentRate=0; Mortalities=0; Graduates=0; Progeny=0; Emigrants=0
          DivideFunction Development: same as PsyllidTest.Field.TomatoPotatoPsyllid.1stInstar.Development
          MultiplyFunction Mortality
            VariableReference CohortPopulation: VariableName=[TomatoPotatoPsyllid].3rdInstar.CurrentCohort.Population
            Constant MortanityRate: FixedValue=0.01; Units=individuals / population
          Constant Reproduction: FixedValue=0; Units=individuals /d
          Constant Migration: FixedValue=0; Units=individuals /d
        LifeCyclePhase 4thInstar: Immigrants=0; DevelopmentRate=0; Mortalities=0; Graduates=0; Progeny=0; Emigrants=0
          DivideFunction Development: same as PsyllidTest.Field.TomatoPotatoPsyllid.1stInstar.Development
          MultiplyFunction Mortality
            VariableReference CohortPopulation: VariableName=[TomatoPotatoPsyllid].4thInstar.CurrentCohort.Population
            Constant MortanityRate: FixedValue=0.01; Units=individuals / population
          Constant Reproduction: FixedValue=0; Units=individuals /d
          Constant Migration: FixedValue=0; Units=individuals /d
        LifeCyclePhase 5thInstar: Immigrants=0; DevelopmentRate=0; Mortalities=0; Graduates=0; Progeny=0; Emigrants=0
          DivideFunction Development: same as PsyllidTest.Field.TomatoPotatoPsyllid.1stInstar.Development
          MultiplyFunction Mortality
            VariableReference CohortPopulation: VariableName=[TomatoPotatoPsyllid].5thInstar.CurrentCohort.Population
            Constant MortanityRate: FixedValue=0.01; Units=individuals / population
          Constant Reproduction: FixedValue=0; Units=individuals /d
          Constant Migration: FixedValue=0; Units=individuals /d
        LifeCyclePhase Adult: Immigrants=0; DevelopmentRate=0; Mortalities=0; Graduates=0; Progeny=0; Emigrants=0
          DivideFunction Development: same as PsyllidTest.Field.TomatoPotatoPsyllid.Adult.Development
          MultiplyFunction Mortality
            VariableReference CohortPopulation: VariableName=[TomatoPotatoPsyllid].Adult.CurrentCohort.Population
            Constant MortanityRate: FixedValue=0.01; Units=individuals / population
          MultiplyFunction Reproduction
            VariableReference CohortPopulation: VariableName=[TomatoPotatoPsyllid].Adult.CurrentCohort.Population
            LinearInterpolationFunction Maturity
              XYPairs: X=[0, 0.3, 0.5, 0.8, 0.9, 1]; Y=[0, 0, 1, 1, 0, 0]
              VariableReference XValue: VariableName=[TomatoPotatoPsyllid].Adult.CurrentCohort.PhysiologicalAge
            Constant DailyLayingRate: FixedValue=0.5; Units=individuals / population
          ProgenyDestinationPhase RegularProgeny: NameOfLifeCycleForProgeny=TomatoPotatoPsyllid; NameOfPhaseForProgeny=Egg
            Constant ProportionOfProgeny: FixedValue=0.8
          ProgenyDestinationPhase ResistantProgeny: NameOfLifeCycleForProgeny=ResistantTomatoPotatoPsyllid; NameOfPhaseForProgeny=Egg
            Constant ProportionOfProgeny: FixedValue=0.2
          Constant Migration: FixedValue=0; Units=individuals /d
      LifeCycle ResistantTomatoPotatoPsyllid
        Memo: same as PsyllidTest.Field.TomatoPotatoPsyllid.Memo
        LifeCyclePhase Egg: Immigrants=0; DevelopmentRate=0; Mortalities=0; Graduates=0; Progeny=0; Emigrants=0
          DivideFunction Development: same as PsyllidTest.Field.TomatoPotatoPsyllid.1stInstar.Development
          MultiplyFunction Mortality
            VariableReference CohortPopulation: VariableName=[ResistantTomatoPotatoPsyllid].Egg.CurrentCohort.Population
            Constant MortanityRate: FixedValue=0.01; Units=individuals / population
          Constant Reproduction: FixedValue=0; Units=individuals /d
          Constant Migration: FixedValue=0; Units=individuals /d
        LifeCyclePhase 1stInstar: Immigrants=0; DevelopmentRate=0; Mortalities=0; Graduates=0; Progeny=0; Emigrants=0
          DivideFunction Development: same as PsyllidTest.Field.TomatoPotatoPsyllid.1stInstar.Development
          MultiplyFunction Mortality
            VariableReference CohortPopulation
              VariableName=[ResistantTomatoPotatoPsyllid].1stInstar.CurrentCohort.Population
            Constant MortanityRate: FixedValue=0.01; Units=individuals / population
          Constant Reproduction: FixedValue=0; Units=individuals /d
          Constant Migration: FixedValue=0; Units=individuals /d
        LifeCyclePhase 2ndInstar: Immigrants=0; DevelopmentRate=0; Mortalities=0; Graduates=0; Progeny=0; Emigrants=0
          DivideFunction Development: same as PsyllidTest.Field.TomatoPotatoPsyllid.1stInstar.Development
          MultiplyFunction Mortality
            VariableReference CohortPopulation
              VariableName=[ResistantTomatoPotatoPsyllid].2ndInstar.CurrentCohort.Population
            Constant MortanityRate: FixedValue=0.01; Units=individuals / population
          Constant Reproduction: FixedValue=0; Units=individuals /d
          Constant Migration: FixedValue=0; Units=individuals /d
        LifeCyclePhase 3rdInstar: Immigrants=0; DevelopmentRate=0; Mortalities=0; Graduates=0; Progeny=0; Emigrants=0
          DivideFunction Development: same as PsyllidTest.Field.TomatoPotatoPsyllid.1stInstar.Development
          MultiplyFunction Mortality
            VariableReference CohortPopulation
              VariableName=[ResistantTomatoPotatoPsyllid].3rdInstar.CurrentCohort.Population
            Constant MortanityRate: FixedValue=0.01; Units=individuals / population
          Constant Reproduction: FixedValue=0; Units=individuals /d
          Constant Migration: FixedValue=0; Units=individuals /d
        LifeCyclePhase 4thInstar: Immigrants=0; DevelopmentRate=0; Mortalities=0; Graduates=0; Progeny=0; Emigrants=0
          DivideFunction Development: same as PsyllidTest.Field.TomatoPotatoPsyllid.1stInstar.Development
          MultiplyFunction Mortality
            VariableReference CohortPopulation
              VariableName=[ResistantTomatoPotatoPsyllid].4thInstar.CurrentCohort.Population
            Constant MortanityRate: FixedValue=0.01; Units=individuals / population
          Constant Reproduction: FixedValue=0; Units=individuals /d
          Constant Migration: FixedValue=0; Units=individuals /d
        LifeCyclePhase 5thInstar: Immigrants=0; DevelopmentRate=0; Mortalities=0; Graduates=0; Progeny=0; Emigrants=0
          DivideFunction Development: same as PsyllidTest.Field.TomatoPotatoPsyllid.1stInstar.Development
          MultiplyFunction Mortality
            VariableReference CohortPopulation
              VariableName=[ResistantTomatoPotatoPsyllid].5thInstar.CurrentCohort.Population
            Constant MortanityRate: FixedValue=0.01; Units=individuals / population
          Constant Reproduction: FixedValue=0; Units=individuals /d
          Constant Migration: FixedValue=0; Units=individuals /d
        LifeCyclePhase Adult: Immigrants=0; DevelopmentRate=0; Mortalities=0; Graduates=0; Progeny=0; Emigrants=0
          DivideFunction Development: same as PsyllidTest.Field.TomatoPotatoPsyllid.Adult.Development
          MultiplyFunction Mortality
            VariableReference CohortPopulation
              VariableName=[ResistantTomatoPotatoPsyllid].Adult.CurrentCohort.Population
            Constant MortanityRate: FixedValue=0.01; Units=individuals / population
          MultiplyFunction Reproduction
            VariableReference CohortPopulation
              VariableName=[ResistantTomatoPotatoPsyllid].Adult.CurrentCohort.Population
            LinearInterpolationFunction Maturity
              XYPairs: X=[0, 0.3, 0.5, 0.8, 0.9, 1]; Y=[0, 0, 1, 1, 0, 0]
              VariableReference XValue
                VariableName=[ResistantTomatoPotatoPsyllid].Adult.CurrentCohort.PhysiologicalAge
            Constant DailyLayingRate: FixedValue=0.5; Units=individuals / population
          ProgenyDestinationPhase RegularProgeny: NameOfLifeCycleForProgeny=TomatoPotatoPsyllid; NameOfPhaseForProgeny=Egg
            Constant ProportionOfProgeny: FixedValue=0.5
          ProgenyDestinationPhase ResistantProgeny: NameOfLifeCycleForProgeny=ResistantTomatoPotatoPsyllid; NameOfPhaseForProgeny=Egg
            Constant ProportionOfProgeny: FixedValue=0.5
          Constant Migration: FixedValue=0; Units=individuals /d
    Memo Memo2
      ------
  Simulation MultiPopnMigrationTest
    Memo: same as PsyllidTest.Memo
    Memo Memo1: same as PsyllidTest.Memo1
    Clock: Start=2016-10-01; End=2017-05-31
    Summary SummaryFile
    Weather: FileName=%root%/Tests/Validation/Wheat/lincoln.met
    MicroClimate: a_interception=0; b_interception=1; c_interception=0; d_interception=0; SoilHeatFluxFraction=0.4; MinimumHeightDiffForNewLayer=0; NightInterceptionFraction=0.5; ReferenceHeight=2
    SoilArbitrator
    Zone Field: Area=1; Slope=0; AspectAngle=0; Altitude=50
      Report: EventNames=[Clock].DoReport
        VariableNames:
          [Clock].Today
          [Clock].Today.DayOfYear
          [TomatoPotatoPsyllid].Egg.TotalPopulation
          [TomatoPotatoPsyllid].1stInstar.TotalPopulation
          [TomatoPotatoPsyllid].2ndInstar.TotalPopulation
          [TomatoPotatoPsyllid].3rdInstar.TotalPopulation
          [TomatoPotatoPsyllid].4thInstar.TotalPopulation
          [TomatoPotatoPsyllid].5thInstar.TotalPopulation
          [TomatoPotatoPsyllid].Adult.TotalPopulation
          [NeighbourTomatoPotatoPsyllid].Egg.TotalPopulation
          [NeighbourTomatoPotatoPsyllid].1stInstar.TotalPopulation
          [NeighbourTomatoPotatoPsyllid].2ndInstar.TotalPopulation
          [NeighbourTomatoPotatoPsyllid].3rdInstar.TotalPopulation
          [NeighbourTomatoPotatoPsyllid].4thInstar.TotalPopulation
          [NeighbourTomatoPotatoPsyllid].5thInstar.TotalPopulation
          [NeighbourTomatoPotatoPsyllid].Adult.TotalPopulation
      Fertiliser
      Soil: same as PsyllidTest.Field.Soil
      SurfaceOrganicMatter: InitialResidueName=wheat_stubble; InitialResidueType=wheat; InitialResidueMass=500; InitialStandingFraction=0; InitialCPR=0; InitialCNR=100
      Manager PlantandHarvest: same as MultiPopnTest.Field.PlantandHarvest
      Plant Potato
      Infestation: same as PsyllidTest.Field.Infestation
      LifeCycle TomatoPotatoPsyllid
        Memo: same as PsyllidTest.Field.TomatoPotatoPsyllid.Memo
        LifeCyclePhase Egg: same as MultiPopnTest.Field.TomatoPotatoPsyllid.Egg
        LifeCyclePhase 1stInstar: same as MultiPopnTest.Field.TomatoPotatoPsyllid.1stInstar
        LifeCyclePhase 2ndInstar: same as MultiPopnTest.Field.TomatoPotatoPsyllid.2ndInstar
        LifeCyclePhase 3rdInstar: same as MultiPopnTest.Field.TomatoPotatoPsyllid.3rdInstar
        LifeCyclePhase 4thInstar: same as MultiPopnTest.Field.TomatoPotatoPsyllid.4thInstar
        LifeCyclePhase 5thInstar: same as MultiPopnTest.Field.TomatoPotatoPsyllid.5thInstar
        LifeCyclePhase Adult: Immigrants=0; DevelopmentRate=0; Mortalities=0; Graduates=0; Progeny=0; Emigrants=0
          DivideFunction Development: same as PsyllidTest.Field.TomatoPotatoPsyllid.Adult.Development
          MultiplyFunction Mortality
            VariableReference CohortPopulation: VariableName=[TomatoPotatoPsyllid].Adult.CurrentCohort.Population
            Constant MortanityRate: FixedValue=0.01; Units=individuals / population
          MultiplyFunction Reproduction: same as MultiPopnTest.Field.TomatoPotatoPsyllid.Adult.Reproduction
          ProgenyDestinationPhase RegularProgeny: NameOfLifeCycleForProgeny=TomatoPotatoPsyllid; NameOfPhaseForProgeny=Egg
          LessThanFunction Migration
            VariableReference PhysiologicalAge: VariableName=[TomatoPotatoPsyllid].Adult.CurrentCohort.PhysiologicalAge
            Constant AreReadyToMigrate: FixedValue=0.3
            Constant NotReady: FixedValue=0
            MultiplyFunction AreReady
              VariableReference Population: VariableName=[TomatoPotatoPsyllid].Adult.CurrentCohort.Population
              Constant ProportionLeaving: FixedValue=0.05
          MigrantDestinationPhase: NameOfLifeCycleForMigrants=NeighbourTomatoPotatoPsyllid; NameOfPhaseForMigrants=Adult
            Constant ProportionOfMigrants: FixedValue=0.2
      LifeCycle NeighbourTomatoPotatoPsyllid
        Memo: same as PsyllidTest.Field.TomatoPotatoPsyllid.Memo
        LifeCyclePhase Egg: Immigrants=0; DevelopmentRate=0; Mortalities=0; Graduates=0; Progeny=0; Emigrants=0
          DivideFunction Development: same as PsyllidTest.Field.TomatoPotatoPsyllid.1stInstar.Development
          MultiplyFunction Mortality
            VariableReference CohortPopulation: VariableName=[NeighbourTomatoPotatoPsyllid].Egg.CurrentCohort.Population
            Constant MortanityRate: FixedValue=0.01; Units=individuals / population
          Constant Reproduction: FixedValue=0; Units=individuals /d
          Constant Migration: FixedValue=0; Units=individuals /d
        LifeCyclePhase 1stInstar: Immigrants=0; DevelopmentRate=0; Mortalities=0; Graduates=0; Progeny=0; Emigrants=0
          DivideFunction Development: same as PsyllidTest.Field.TomatoPotatoPsyllid.1stInstar.Development
          MultiplyFunction Mortality
            VariableReference CohortPopulation
              VariableName=[NeighbourTomatoPotatoPsyllid].1stInstar.CurrentCohort.Population
            Constant MortanityRate: FixedValue=0.01; Units=individuals / population
          Constant Reproduction: FixedValue=0; Units=individuals /d
          Constant Migration: FixedValue=0; Units=individuals /d
        LifeCyclePhase 2ndInstar: Immigrants=0; DevelopmentRate=0; Mortalities=0; Graduates=0; Progeny=0; Emigrants=0
          DivideFunction Development: same as PsyllidTest.Field.TomatoPotatoPsyllid.1stInstar.Development
          MultiplyFunction Mortality
            VariableReference CohortPopulation
              VariableName=[NeighbourTomatoPotatoPsyllid].2ndInstar.CurrentCohort.Population
            Constant MortanityRate: FixedValue=0.01; Units=individuals / population
          Constant Reproduction: FixedValue=0; Units=individuals /d
          Constant Migration: FixedValue=0; Units=individuals /d
        LifeCyclePhase 3rdInstar: Immigrants=0; DevelopmentRate=0; Mortalities=0; Graduates=0; Progeny=0; Emigrants=0
          DivideFunction Development: same as PsyllidTest.Field.TomatoPotatoPsyllid.1stInstar.Development
          MultiplyFunction Mortality
            VariableReference CohortPopulation
              VariableName=[NeighbourTomatoPotatoPsyllid].3rdInstar.CurrentCohort.Population
            Constant MortanityRate: FixedValue=0.01; Units=individuals / population
          Constant Reproduction: FixedValue=0; Units=individuals /d
          Constant Migration: FixedValue=0; Units=individuals /d
        LifeCyclePhase 4thInstar: Immigrants=0; DevelopmentRate=0; Mortalities=0; Graduates=0; Progeny=0; Emigrants=0
          DivideFunction Development: same as PsyllidTest.Field.TomatoPotatoPsyllid.1stInstar.Development
          MultiplyFunction Mortality
            VariableReference CohortPopulation
              VariableName=[NeighbourTomatoPotatoPsyllid].4thInstar.CurrentCohort.Population
            Constant MortanityRate: FixedValue=0.01; Units=individuals / population
          Constant Reproduction: FixedValue=0; Units=individuals /d
          Constant Migration: FixedValue=0; Units=individuals /d
        LifeCyclePhase 5thInstar: Immigrants=0; DevelopmentRate=0; Mortalities=0; Graduates=0; Progeny=0; Emigrants=0
          DivideFunction Development: same as PsyllidTest.Field.TomatoPotatoPsyllid.1stInstar.Development
          MultiplyFunction Mortality
            VariableReference CohortPopulation
              VariableName=[NeighbourTomatoPotatoPsyllid].5thInstar.CurrentCohort.Population
            Constant MortanityRate: FixedValue=0.01; Units=individuals / population
          Constant Reproduction: FixedValue=0; Units=individuals /d
          Constant Migration: FixedValue=0; Units=individuals /d
        LifeCyclePhase Adult: Immigrants=0; DevelopmentRate=0; Mortalities=0; Graduates=0; Progeny=0; Emigrants=0
          DivideFunction Development: same as PsyllidTest.Field.TomatoPotatoPsyllid.Adult.Development
          MultiplyFunction Mortality
            VariableReference CohortPopulation
              VariableName=[NeighbourTomatoPotatoPsyllid].Adult.CurrentCohort.Population
            Constant MortanityRate: FixedValue=0.01; Units=individuals / population
          MultiplyFunction Reproduction
            VariableReference CohortPopulation
              VariableName=[NeighbourTomatoPotatoPsyllid].Adult.CurrentCohort.Population
            LinearInterpolationFunction Maturity
              XYPairs: X=[0, 0.3, 0.5, 0.8, 0.9, 1]; Y=[0, 0, 1, 1, 0, 0]
              VariableReference XValue
                VariableName=[NeighbourTomatoPotatoPsyllid].Adult.CurrentCohort.PhysiologicalAge
            Constant DailyLayingRate: FixedValue=0.5; Units=individuals / population
          ProgenyDestinationPhase RegularProgeny: NameOfLifeCycleForProgeny=NeighbourTomatoPotatoPsyllid; NameOfPhaseForProgeny=Egg
          Constant Migration: FixedValue=0; Units=individuals /d
    Memo Memo2
      ------
  Simulation PotatoPsyllidLiberobacter
    Memo: same as PsyllidTest.Memo
    Memo Memo1: same as PsyllidTest.Memo1
    Clock: Start=2016-10-01; End=2017-05-31
    Summary SummaryFile
    Weather: FileName=%root%/Tests/Validation/Wheat/lincoln.met
    MicroClimate: a_interception=0; b_interception=1; c_interception=0; d_interception=0; SoilHeatFluxFraction=0.4; MinimumHeightDiffForNewLayer=0; NightInterceptionFraction=0.5; ReferenceHeight=2
    SoilArbitrator
    Zone Field: Area=1; Slope=0; AspectAngle=0; Altitude=50
      Report: EventNames=[Clock].DoReport
        VariableNames:
          [Clock].Today
          [Clock].Today.DayOfYear
          [TomatoPotatoPsyllid].Egg.TotalPopulation
          [TomatoPotatoPsyllid].1stInstar.TotalPopulation
          [TomatoPotatoPsyllid].2ndInstar.TotalPopulation
          [TomatoPotatoPsyllid].3rdInstar.TotalPopulation
          [TomatoPotatoPsyllid].4thInstar.TotalPopulation
          [TomatoPotatoPsyllid].5thInstar.TotalPopulation
          [TomatoPotatoPsyllid].Adult.TotalPopulation
          [Potato].HostLiberobacter.Alive.TotalPopulation
          [TomatoPotatoPsyllid].VectorLiberobacter.Alive.TotalPopulation
          [TomatoPotatoPsyllid].Adult.FeedingEvents
      Fertiliser
      Soil: same as PsyllidTest.Field.Soil
      SurfaceOrganicMatter: InitialResidueName=wheat_stubble; InitialResidueType=wheat; InitialResidueMass=500; InitialStandingFraction=0; InitialCPR=0; InitialCNR=100
      Manager PlantandHarvest: same as MultiPopnTest.Field.PlantandHarvest
      Plant Potato
        LifeCycle HostLiberobacter
          Memo: same as PsyllidTest.Field.TomatoPotatoPsyllid.Memo
          LifeCyclePhase Alive: Immigrants=0; DevelopmentRate=0; Mortalities=0; Graduates=0; Progeny=0; Emigrants=0
            Memo
              ***LiberoBacter***

              Development is 1 which means each cohort will only last 1 day

              Mortality is zero becasue everything dies each day

              Reproduction sets the size of the pobulation of the next days cohort

              Migration determines how many pass to the host
            Constant Development: FixedValue=1; Units=individuals /d
            MultiplyFunction Mortality
              VariableReference CohortPopulation: VariableName=[HostLiberobacter].Alive.CurrentCohort.Population
              Constant DeathRate: FixedValue=0.02; Units=individuals / population
            MultiplyFunction Reproduction
              VariableReference CohortPopulation: VariableName=[HostLiberobacter].Alive.CurrentCohort.Population
              Constant Copies: FixedValue=1.013; Units=individuals / population
            ProgenyDestinationPhase: NameOfLifeCycleForProgeny=HostLiberobacter; NameOfPhaseForProgeny=Alive
            Constant Migration: FixedValue=0; Units=individuals /d
      Infestation PsyllidInfestation: same as PsyllidTest.Field.Infestation
      Infestation LiberobacterInfestation: TypeOfInfestation=1; InfestingOrganisumName=VectorLiberobacter; InfestingPhaseName=Alive; InfestationDate=15-Nov; ChronoAgeOfImmigrants=0; PhysAgeOfImmigrants=0.2
        Constant NumberOfImmigrants: FixedValue=200
      LifeCycle TomatoPotatoPsyllid
        Memo: same as PsyllidTest.Field.TomatoPotatoPsyllid.Memo
        LifeCyclePhase Egg: Immigrants=0; DevelopmentRate=0; Mortalities=0; Graduates=0; Progeny=0; Emigrants=0
          DivideFunction Development: same as PsyllidTest.Field.TomatoPotatoPsyllid.1stInstar.Development
          MultiplyFunction Mortality
            VariableReference CohortPopulation: VariableName=[Egg].CurrentCohort.Population
            Constant MortanityRate: FixedValue=0.01; Units=individuals / population
          Constant Reproduction: FixedValue=0; Units=individuals /d
          Constant Migration: FixedValue=0; Units=individuals /d
        LifeCyclePhase 1stInstar: same as PsyllidTest.Field.TomatoPotatoPsyllid.1stInstar
        LifeCyclePhase 2ndInstar: same as PsyllidTest.Field.TomatoPotatoPsyllid.2ndInstar
        LifeCyclePhase 3rdInstar: same as PsyllidTest.Field.TomatoPotatoPsyllid.3rdInstar
        LifeCyclePhase 4thInstar: same as PsyllidTest.Field.TomatoPotatoPsyllid.4thInstar
        LifeCyclePhase 5thInstar: same as PsyllidTest.Field.TomatoPotatoPsyllid.5thInstar
        LifeCyclePhase Adult: Immigrants=0; DevelopmentRate=0; Mortalities=0; Graduates=0; Progeny=0; Emigrants=0
          DivideFunction Development: same as PsyllidTest.Field.TomatoPotatoPsyllid.Adult.Development
          MultiplyFunction Mortality
            VariableReference CohortPopulation: VariableName=[Adult].CurrentCohort.Population
            Constant MortanityRate: FixedValue=0.01; Units=individuals / population
          MultiplyFunction Reproduction: same as PsyllidTest.Field.TomatoPotatoPsyllid.Adult.Reproduction
          ProgenyDestinationPhase: NameOfLifeCycleForProgeny=TomatoPotatoPsyllid; NameOfPhaseForProgeny=Egg
          Constant Migration: FixedValue=0; Units=individuals /d
          AccumulateCohortExpression FeedingEvents
            MultiplyFunction Expression
              VariableReference CohortPopulation
                VariableName=[TomatoPotatoPsyllid].Adult.FeedingEvents.CurrentCohort.Population
              LinearInterpolationFunction FeedingActivity
                XYPairs: X=[0, 0.1, 0.2, 0.4, 0.6, 1]; Y=[0, 0, 1, 1, 0, 0]
                VariableReference XValue
                  VariableName=[TomatoPotatoPsyllid].Adult.FeedingEvents.CurrentCohort.PhysiologicalAge
              SubDailyInterpolation FeedsPerDay: agregationMethod=0
                XYPairs Response: X=[0, 15, 27, 32]; Y=[0, 0, 5, 0]
                ThreeHourAirTemperature InterpolationMethod
        LifeCycle VectorLiberobacter
          Memo: same as PsyllidTest.Field.TomatoPotatoPsyllid.Memo
          LifeCyclePhase Alive: Immigrants=0; DevelopmentRate=0; Mortalities=0; Graduates=0; Progeny=0; Emigrants=0
            Memo
              ***LiberoBacter***

              Development is 1 which means each cohort will only last 1 day

              Mortality is zero becasue everything dies each day

              Reproduction sets the size of the pobulation of the next days cohort

              Migration determines how many pass to the host
            Constant Development: FixedValue=1; Units=individuals /d
            MultiplyFunction Mortality
              VariableReference CohortPopulation: VariableName=[VectorLiberobacter].Alive.CurrentCohort.Population
              Constant DeathRate: FixedValue=0.02; Units=individuals / population
            MultiplyFunction Reproduction
              VariableReference CohortPopulation: VariableName=[VectorLiberobacter].Alive.CurrentCohort.Population
              Constant Copies: FixedValue=1.013; Units=individuals / population
            ProgenyDestinationPhase: NameOfLifeCycleForProgeny=VectorLiberobacter; NameOfPhaseForProgeny=Alive
            MultiplyFunction Migration
              VariableReference VectorFeedingEvents: VariableName=[TomatoPotatoPsyllid].Adult.FeedingEvents
              VariableReference VectorInfectionLevel: VariableName=[VectorLiberobacter].Alive.CurrentCohort.Population
              Constant ProportionTransferedPerFeed: FixedValue=0.001
            MigrantDestinationPhase: NameOfLifeCycleForMigrants=HostLiberobacter; NameOfPhaseForMigrants=Alive
    Memo Memo2
      ------
  Simulation PotatoPsyllidDamageTest
    Memo: same as PsyllidTest.Memo
    Memo Memo1: same as PsyllidTest.Memo1
    Clock: Start=2016-10-01; End=2017-05-31
    Summary SummaryFile
    Weather: FileName=%root%/Tests/Validation/Wheat/lincoln.met
    MicroClimate: a_interception=0; b_interception=1; c_interception=0; d_interception=0; SoilHeatFluxFraction=0.4; MinimumHeightDiffForNewLayer=0; NightInterceptionFraction=0.5; ReferenceHeight=2
    SoilArbitrator
    Zone Field: Area=1; Slope=0; AspectAngle=0; Altitude=50
      Report: same as PsyllidTest.Field.Report
      Fertiliser
      Soil: same as PsyllidTest.Field.Soil
      SurfaceOrganicMatter: InitialResidueName=wheat_stubble; InitialResidueType=wheat; InitialResidueMass=500; InitialStandingFraction=0; InitialCPR=0; InitialCNR=100
      Manager PlantandHarvest: same as PsyllidTest.Field.PlantandHarvest
      Plant Potato
      Infestation: same as PsyllidTest.Field.Infestation
      LifeCycle TomatoPotatoPsyllid
        Memo: same as PsyllidTest.Field.TomatoPotatoPsyllid.Memo
        LifeCyclePhase Egg: same as PotatoPsyllidLiberobacter.Field.TomatoPotatoPsyllid.Egg
        LifeCyclePhase 1stInstar: same as PsyllidTest.Field.TomatoPotatoPsyllid.1stInstar
        LifeCyclePhase 2ndInstar: same as PsyllidTest.Field.TomatoPotatoPsyllid.2ndInstar
        LifeCyclePhase 3rdInstar: same as PsyllidTest.Field.TomatoPotatoPsyllid.3rdInstar
        LifeCyclePhase 4thInstar: same as PsyllidTest.Field.TomatoPotatoPsyllid.4thInstar
        LifeCyclePhase 5thInstar: same as PsyllidTest.Field.TomatoPotatoPsyllid.5thInstar
        LifeCyclePhase Adult: Immigrants=0; DevelopmentRate=0; Mortalities=0; Graduates=0; Progeny=0; Emigrants=0
          DivideFunction Development: same as PsyllidTest.Field.TomatoPotatoPsyllid.Adult.Development
          MultiplyFunction Mortality
            VariableReference CohortPopulation: VariableName=[Adult].CurrentCohort.Population
            Constant MortanityRate: FixedValue=0.01; Units=individuals / population
          MultiplyFunction Reproduction: same as PsyllidTest.Field.TomatoPotatoPsyllid.Adult.Reproduction
          ProgenyDestinationPhase: NameOfLifeCycleForProgeny=TomatoPotatoPsyllid; NameOfPhaseForProgeny=Egg
          Constant Migration: FixedValue=0; Units=individuals /d
          PlantOrganConsumption LeafConsumption: HostOrganName=Potato.Leaf
            MultiplyFunction OrganWtConsumptionPerIndividual
              LinearInterpolationFunction MaturityFactor
                XYPairs: X=[0, 0.1, 0.3, 0.8, 0.9, 1]; Y=[0, 0, 1, 1, 0, 0]
                VariableReference XValue: VariableName=[Adult].CurrentCohort.PhysiologicalAge
              Constant MaximumDailyConsumption: FixedValue=0.0002; Units=g leaf/adult psyllid
    Memo Memo2
      ------
  Simulation AlternariaTest
    Memo: same as PsyllidTest.Memo
    Memo Memo1: same as PsyllidTest.Memo1
    Clock: Start=2016-10-01; End=2017-05-31
    Summary SummaryFile
    Weather: FileName=%root%/Tests/Validation/Wheat/lincoln.met
    MicroClimate: a_interception=0; b_interception=1; c_interception=0; d_interception=0; SoilHeatFluxFraction=0.4; MinimumHeightDiffForNewLayer=0; NightInterceptionFraction=0.5; ReferenceHeight=2
    SoilArbitrator
    Zone Field: Area=1; Slope=0; AspectAngle=0; Altitude=50
      Report: EventNames=[Clock].DoReport
        VariableNames:
          [Clock].Today
          [Clock].Today.DayOfYear
          [Alternaria_solani_InSoil].ConidiaOnDecayingFoliage.TotalPopulation
          [Alternaria_solani_InSoil].ConidiaOnDecayingFoliage.CohortCount
          [Alternaria_solani_InSoil].MyceliumOnDecayingFoliage.TotalPopulation
          [Alternaria_solani_InSoil].MyceliumOnDecayingFoliage.CohortCount
          [Alternaria_solani_OnLivePlant].ConidiaOnFreshFoliage.TotalPopulation
          [Alternaria_solani_OnLivePlant].ConidiaOnFreshFoliage.CohortCount
          [Alternaria_solani_OnLivePlant].MyceliumOnLiveFoliage.TotalPopulation
          [Alternaria_solani_OnLivePlant].MyceliumOnLiveFoliage.CohortCount
          [Potato].Leaf.Live.Wt
      Fertiliser
      Irrigation
      Soil: same as PsyllidTest.Field.Soil
      SurfaceOrganicMatter: InitialResidueName=wheat_stubble; InitialResidueType=wheat; InitialResidueMass=500; InitialStandingFraction=0; InitialCPR=0; InitialCNR=100
      Manager PlantandHarvest: same as PsyllidTest.Field.PlantandHarvest
      Plant Potato
      Infestation InitialSoilInfestation: TypeOfInfestation=0; InfestingOrganisumName=Alternaria_solani_InSoil; InfestingPhaseName=MyceliumOnDecayingFoliage; ChronoAgeOfImmigrants=0; PhysAgeOfImmigrants=0.2
        Constant NumberOfImmigrants: FixedValue=100
      LifeCycle Alternaria_solani_InSoil
        Memo: same as PsyllidTest.Field.TomatoPotatoPsyllid.Memo
        LifeCyclePhase ConidiaOnDecayingFoliage: Immigrants=0; DevelopmentRate=0; Mortalities=0; Graduates=0; Progeny=0; Emigrants=0
          DivideFunction Development
            MultiplyFunction DevelopmentRate
              SubDailyInterpolation TemperatureResponse: agregationMethod=1
                XYPairs Response: X=[0, 15, 24, 29, 35]; Y=[0, 0, 1, 1, 0]
                HourlySinPpAdjusted InterpolationMethod
              LinearInterpolationFunction HumidityResponse
                XYPairs: X=[0, 0.5, 1, 5]; Y=[1, 1, 0, 0]
                VariableReference XValue: VariableName=[IWeather].VPD
            Constant DurationInOptConditions: FixedValue=2; Units=individuals /d
          Constant Reproduction: FixedValue=0; Units=individuals /d
          Constant Mortality: FixedValue=0; Units=individuals /d
          MultiplyFunction Migration
            VariableReference CohortPopulation: VariableName=[ConidiaOnDecayingFoliage].CurrentCohort.Population
            MinimumFunction DispersalFunction
              AddFunction Dispersal
                MultiplyFunction RainFactor
                  LinearInterpolationFunction RainFallFactor
                    XYPairs: X=[0, 2, 20, 30]; Y=[0, 0, 1, 1]
                    VariableReference XValue: VariableName=[IWeather].Rain
                  LinearInterpolationFunction CoverFactor
                    XYPairs: X=[0, 0.5, 1]; Y=[1, 1, 0.05]
                    VariableReference XValue: VariableName=[Potato].Leaf.CoverTotal
                MultiplyFunction IrrigFactor
                  LinearInterpolationFunction IrrigationFactor
                    XYPairs: X=[0, 1, 2]; Y=[0, 1, 1]
                    VariableReference XValue: VariableName=[Irrigation].IrrigationApplied
                  LinearInterpolationFunction CoverFactor
                    XYPairs: X=[0, 0.5, 1]; Y=[1, 1, 0.05]
                    VariableReference XValue: VariableName=[Potato].Leaf.CoverTotal
                MultiplyFunction WindFact
                  LinearInterpolationFunction WindFactor
                    XYPairs: X=[0, 3, 8, 10]; Y=[0, 0, 1, 1]
                    VariableReference XValue: VariableName=[Weather].Wind
                  LinearInterpolationFunction CoverFactor
                    XYPairs: X=[0, 0.5, 1]; Y=[1, 1, 0.05]
                    VariableReference XValue: VariableName=[Potato].Leaf.CoverTotal
              Constant One: FixedValue=1; Units=individuals /d
          MigrantDestinationPhase: NameOfLifeCycleForMigrants=Alternaria_solani_OnLivePlant; NameOfPhaseForMigrants=ConidiaOnFreshFoliage
        LifeCyclePhase MyceliumOnDecayingFoliage: Immigrants=0; DevelopmentRate=0; Mortalities=0; Graduates=0; Progeny=0; Emigrants=0
          Constant Development: FixedValue=0; Units=individuals /d
          MultiplyFunction Mortality
            VariableReference CohortPopulation: VariableName=[MyceliumOnDecayingFoliage].CurrentCohort.Population
            Constant MortalityRate: FixedValue=0.02; Units=individuals /d
          Constant Migration: FixedValue=0; Units=individuals /d
          MultiplyFunction Reproduction
            VariableReference CohortPopulation: VariableName=[MyceliumOnDecayingFoliage].CurrentCohort.Population
            LinearInterpolationFunction AgeFactor
              XYPairs: X=[0, 0.06, 0.07, 0.2]; Y=[0, 0, 1, 1]
              VariableReference XValue: VariableName=[MyceliumOnDecayingFoliage].CurrentCohort.PhysiologicalAge
          ProgenyDestinationPhase: NameOfLifeCycleForProgeny=Alternaria_solani_InSoil; NameOfPhaseForProgeny=ConidiaOnDecayingFoliage
      LifeCycle Alternaria_solani_OnLivePlant
        Memo: same as PsyllidTest.Field.TomatoPotatoPsyllid.Memo
        LifeCyclePhase ConidiaOnFreshFoliage: Immigrants=0; DevelopmentRate=0; Mortalities=0; Graduates=0; Progeny=0; Emigrants=0
          DivideFunction Development
            MultiplyFunction DevelopmentRate
              SubDailyInterpolation TemperatureResponse: agregationMethod=1
                XYPairs Response: X=[0, 13, 24, 29, 30]; Y=[0, 0, 1, 1, 0]
                HourlySinPpAdjusted InterpolationMethod
              LinearInterpolationFunction HumidityResponse
                XYPairs: X=[0, 0.5, 1, 5]; Y=[1, 1, 1, 1]
                VariableReference XValue: VariableName=[IWeather].VPD
            Constant DurationInOptConditions: FixedValue=24; Units=Hours to germinate
          MultiplyFunction Mortality
            VariableReference CohortPopulation: VariableName=[ConidiaOnFreshFoliage].CurrentCohort.Population
            Constant MortanityRate: FixedValue=1; Units=individuals / population
            SubDailyInterpolation TemperatureResponse: agregationMethod=0
              XYPairs Response: X=[0, 4, 7, 45]; Y=[1, 1, 0.01, 0.01]
              ThreeHourAirTemperature InterpolationMethod
            LinearInterpolationFunction HumidityResponse
              XYPairs: X=[0, 3]; Y=[0, 1]
              VariableReference XValue: VariableName=[IWeather].VPD
          Constant Reproduction: FixedValue=0; Units=individuals /d
          MultiplyFunction Migration
            VariableReference CohortPopulation: VariableName=[ConidiaOnDecayingFoliage].CurrentCohort.Population
            MinimumFunction
              AddFunction Dispersal
                MultiplyFunction RainFactor: same as AlternariaTest.Field.Alternaria_solani_InSoil.ConidiaOnDecayingFoliage.Migration.DispersalFunction.Dispersal.RainFactor
                MultiplyFunction IrrigFactor: same as AlternariaTest.Field.Alternaria_solani_InSoil.ConidiaOnDecayingFoliage.Migration.DispersalFunction.Dispersal.IrrigFactor
                MultiplyFunction WindFact
                  LinearInterpolationFunction WindFactor
                    XYPairs: X=[0, 3, 8, 10]; Y=[0, 0, 1, 1]
                    VariableReference XValue: VariableName=[Weather].Wind
                  LinearInterpolationFunction CoverFactor
                    XYPairs: X=[0, 3, 8, 10]; Y=[0, 0, 1, 1]
                    VariableReference XValue: VariableName=[Potato].Leaf.CoverTotal
              Constant One: FixedValue=1; Units=individuals /d
          MigrantDestinationPhase: NameOfLifeCycleForMigrants=Alternaria_solani_OnLivePlant; NameOfPhaseForMigrants=ConidiaOnFreshFoliage
        LifeCyclePhase MyceliumOnLiveFoliage: Immigrants=0; DevelopmentRate=0; Mortalities=0; Graduates=0; Progeny=0; Emigrants=0
          DivideFunction Development
            MultiplyFunction DevelopmentRate
              SubDailyInterpolation TemperatureResponse: agregationMethod=0
                XYPairs Response: X=[0, 15, 24, 29, 35]; Y=[0, 0, 1, 1, 0]
                ThreeHourAirTemperature InterpolationMethod
              LinearInterpolationFunction HumidityResponse
                XYPairs: X=[0, 0.5, 1, 5]; Y=[1, 1, 0, 0]
                VariableReference XValue: VariableName=[IWeather].VPD
              LinearInterpolationFunction PlantStressResponse
                XYPairs: X=[0, 0.3, 0.9, 1]; Y=[1, 1, 0.2, 0.2]
                MultiplyFunction XValue
                  VariableReference NitrogenStressFactor: VariableName=[Potato].Leaf.Fn
                  VariableReference WaterStressFactor: VariableName=[Potato].Leaf.Fw
            Constant DurationInOptConditions: FixedValue=100; Units=individuals /d
          Constant Mortality: FixedValue=0; Units=individuals /d
          MultiplyFunction Migration
            VariableReference CohortPopulation: VariableName=[MyceliumOnLiveFoliage].CurrentCohort.Population
            VariableReference FractionLeafSenescence: VariableName=[Potato].Leaf.FractionDied
            LinearInterpolationFunction LeafDeathFactor (disabled)
              XYPairs: X=[0, 1]; Y=[0, 1]
              DivideFunction XValue
                VariableReference DeadLeaves: VariableName=[Potato].Leaf.DeadCohortNo
                VariableReference TotalLeaves: VariableName=[Potato].Structure.FinalLeafNumber
          MigrantDestinationPhase: NameOfLifeCycleForMigrants=Alternaria_solani_InSoil; NameOfPhaseForMigrants=MyceliumOnDecayingFoliage
          MultiplyFunction Reproduction
            VariableReference CohortPopulation: VariableName=[MyceliumOnLiveFoliage].CurrentCohort.Population
            LinearInterpolationFunction AgeFactor
              XYPairs: X=[0, 0.06, 0.07, 0.2]; Y=[0, 0, 1, 1]
              VariableReference XValue: VariableName=[MyceliumOnLiveFoliage].CurrentCohort.PhysiologicalAge
          ProgenyDestinationPhase: NameOfLifeCycleForProgeny=Alternaria_solani_OnLivePlant; NameOfPhaseForProgeny=ConidiaOnFreshFoliage
          PlantOrganFunctionalDimensionReduction NecroticLesions: HostOrganName=Potato.Leaf
            MultiplyFunction DimensionReductionPerIndividual
              LinearInterpolationFunction AgeFactor
                XYPairs: X=[0, 0.06, 1]; Y=[0, 0, 1]
                VariableReference XValue: VariableName=[MyceliumOnLiveFoliage].CurrentCohort.PhysiologicalAge
              DivideFunction LegionAreaIndex
                Constant MaximumLegionArea: FixedValue=5; Units=mm^2
                Constant: FixedValue=1000000; Units=mm^2/m^2
    Memo Memo2
      ------
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