Simulations: Version=70
  DataStore
  Simulation RustSimulation
    Clock: Start=1986-05-01; End=1986-12-31
    Summary SummaryFile
    Weather: FileName=TestWaggaNormal.met
    SoilArbitrator
    Zone Field: Area=1; Slope=0; AspectAngle=0; Altitude=50
      Report: EventNames=[Clock].EndOfDay
        VariableNames:
          [Clock].Today
          [Clock].Today.DayOfYear
          [Wheat].Leaf.LAI
          [Wheat].AboveGround.Wt
          [Weather].Rain
          [Humidity9am].RH
          [LifeCycle].Spore.TotalPopulation
          [LifeCycle].Infective.TotalPopulation
          [LifeCycle].Lesion.TotalPopulation
      Report SporeR: EventNames=[Clock].EndOfDay
        VariableNames:
          [Clock].Today
          [Clock].Today.DayOfYear
          [Wheat].Leaf.LAI
          [Wheat].AboveGround.Wt
          [Weather].Rain
          [Humidity9am].RH
          [LifeCycle].Spore.TotalPopulation
          [LifeCycle].Spore.TransToInfective.transfer
          [LifeCycle].Spore.TransToInfective.transfer.LAIPresent
          [LifeCycle].Spore.TransToInfective.transfer.RainOccurred
          [LifeCycle].Infective.TotalPopulation
      Report InfectiveR: EventNames=[Clock].EndOfDay
        VariableNames:
          [Clock].Today
          [Clock].Today.DayOfYear
          [Wheat].Leaf.LAI
          [Wheat].AboveGround.Wt
          [Weather].Rain
          [Humidity9am].RH
          [LifeCycle].Infective.TransferToLesion.ExpressionFunction
          [LifeCycle].Infective.TransferToLesion.ExpressionFunction.Humidity
          [LifeCycle].Infective.TotalPopulation
      Report LesionR: EventNames=[Clock].EndOfDay
        VariableNames:
          [Clock].Today
          [Clock].Today.DayOfYear
          [Wheat].Leaf.LAI
          [Wheat].AboveGround.Wt
          [Weather].Rain
          [Humidity9am].RH
          [LifeCycle].Infective.TotalPopulation
          [LifeCycle].Lesion.Pop.PopValue
          [LifeCycle].Lesion.TotalPopulation
          [LifeCycle].Lesion.lesionGrowth.growth
          [LifeCycle].Lesion.Mortality
          [LifeCycle].accum
      Fertiliser
      Soil: ASCOrder=Vertosol; ASCSubOrder=Black; SoilType=Clay; Site=Norwin; NearestTown=Norwin; Region=Darling Downs and Granite Belt; State=Queensland; Country=Australia; NaturalVegetation=Qld. Bluegrass, possible Qld. Blue gum; ApsoilNumber=900; Latitude=-27.581836; Longitude=151.320206; LocationAccuracy=+/- 20m
        DataSource=CSIRO Sustainable Ecosystems, Toowoomba; Characteriesd as part of the GRDC funded project"Doing it better, doing it smarter, managing soil water in Australian agriculture' 2011
        Comments=OC, CLL for all crops estimated-based on Bongeen Mywybilla Soil No1
        Physical
          Thickness  BD       AirDry    LL15      DUL       SAT       KS
          150        1.01056  0.13025   0.2605    0.521     0.588655  20
          150        1.07146  0.198689  0.248362  0.496723  0.565677  20
          300        1.09394  0.28      0.28      0.488438  0.557193  20
          300        1.15861  0.28      0.28      0.480297  0.532787  20
          300        1.17301  0.28      0.28      0.471584  0.527354  20
          300        1.16287  0.28      0.28      0.457071  0.53118   20
          300        1.1875   0.28      0.28      0.452332  0.521888  20
          SoilCrop WheatSoil: LL=[0.261, 0.248, 0.28, 0.306, 0.36, 0.392, 0.446]; KL=[0.06, 0.06, 0.06, 0.04, 0.04, 0.02, 0.01]; XF=[1, 1, 1, 1, 1, 1, 1]
        SoilWater: SummerDate=1-Nov; SummerU=5; SummerCona=5; WinterDate=1-Apr; WinterU=5; WinterCona=5; DiffusConst=40; DiffusSlope=16; Salb=0.12; CN2Bare=73; CNRed=20; CNCov=0.8; max_pond=0; Thickness=[150, 150, 300, 300, 300, 300, 300]; SWCON=[0.3, 0.3, 0.3, 0.3, 0.3, 0.3, 0.3]; PrecipitationInterception=0
        Organic: FOMCNRatio=40
          Thickness  Carbon  SoilCNRatio  FBiom  FInert  FOM
          150        1.2     12           0.04   0.4     347.129
          150        0.96    12           0.02   0.6     270.344
          300        0.6     12           0.02   0.8     163.972
          300        0.3     12           0.02   1       99.4541
          300        0.18    12           0.01   1       60.322
          300        0.12    12           0.01   1       36.5871
          300        0.12    12           0.01   1       22.1912
        Chemical
          Thickness  NO3N  NH4N  PH
          150        1     0.1   8
          150        1     0.1   8
          300        1     0.1   8
          300        1     0.1   8
          300        1     0.1   8
          300        1     0.1   8
          300        1     0.1   8
        InitialWater: PercentMethod=1; FractionFull=1
        Sample InitialN: Thickness=[150, 150, 300, 300, 300, 300, 300]; SWUnits=Volumetric; OCUnits=Total; PHUnits=Water
        CERESSoilTemperature
        Nutrient
          DirectedGraphInfo={Nodes=[{Name=Inert, OutlineColour=Black}, {Name=SurfaceResidue, OutlineColour=Black}, {Name=FOMLignin, OutlineColour=Black}, {Name=FOMCellulose, OutlineColour=Black}, {Name=FOMCarbohydrate, OutlineColour=Black}, {Name=Microbial, OutlineColour=Black}, {Name=Humic, OutlineColour=Black}, {Name=Urea, OutlineColour=Black}, {Name=NO3, OutlineColour=Black}, {Name=NH4, OutlineColour=Black}, {Name=Atmosphere, OutlineColour=White}, {Name=PlantAvailableNO3, OutlineColour=Black}, {Name=PlantAvailableNH4, OutlineColour=Black}], Arcs=[{SourceName=SurfaceResidue, DestinationName=Microbial}, {SourceName=SurfaceResidue, DestinationName=Humic}, {SourceName=FOMLignin, DestinationName=Microbial}, {SourceName=FOMLignin, DestinationName=Humic}, {SourceName=FOMCellulose, DestinationName=Microbial}, {SourceName=FOMCellulose, DestinationName=Humic}, {SourceName=FOMCarbohydrate, DestinationName=Microbial}, {SourceName=FOMCarbohydrate, DestinationName=Humic}, {SourceName=Microbial, DestinationName=Microbial}, {SourceName=Microbial, DestinationName=Humic}, {SourceName=Humic, DestinationName=Microbial}, {SourceName=Urea, DestinationName=NH4}, {SourceName=NO3, DestinationName=Atmosphere}, {SourceName=NH4, DestinationName=NO3}]}
      SurfaceOrganicMatter: InitialResidueName=wheat_stubble; InitialResidueType=wheat; InitialResidueMass=500; InitialStandingFraction=0; InitialCPR=0; InitialCNR=100; FractionFaecesAdded=0.5
      Plant Wheat: CropType=Wheat; IsEnding=false; DaysAfterEnding=0
      Manager Sow on a fixed date
        Crop = [Wheat]
        SowDate = 15-May
        CultivarName = Hartog
        SowingDepth = 30
        RowSpacing = 250
        Population = 100
```csharp
using System;
using Models.Core;
using Models.PMF;
using Models.Soils;
using Models.Utilities;
using APSIM.Shared.Utilities;

namespace Models
{
    [Serializable]
    public class Script : Model
    {
        [Link] Clock Clock;
        [Link] Fertiliser Fertiliser;
        [Link] Summary Summary;
        [Link] Soil Soil;
        Accumulator accumulatedRain;
        
        [Description("Crop")]
        public IPlant Crop { get; set; }
        [Description("Sowing date (d-mmm)")]
        public string SowDate { get; set; }
    [Display(Type = DisplayType.CultivarName)]
        [Description("Cultivar to be sown")]
        public string CultivarName { get; set; }
        [Description("Sowing depth (mm)")]
        public double SowingDepth { get; set; }
        [Description("Row spacing (mm)")]
        public double RowSpacing { get; set; }
        [Description("Plant population (/m2)")]
        public double Population { get; set; }
        


        [EventSubscribe("DoManagement")]
        private void OnDoManagement(object sender, EventArgs e)
        {
            if (DateUtilities.WithinDates(SowDate, Clock.Today, SowDate))
            {
                Crop.Sow(population: Population, cultivar: CultivarName, depth: SowingDepth, rowSpacing: RowSpacing);    
            }
        
        }
        
    }
}
```
      MicroClimate: a_interception=0; b_interception=1; c_interception=0; d_interception=0; soil_albedo=0.3; SoilHeatFluxFraction=0.4; NightInterceptionFraction=0.5; ReferenceHeight=2
      Manager SowingFertiliser
        Amount = 160
        CropName = wheat
```csharp
using System;
using Models.Core;
using Models.PMF;
namespace Models
{
    [Serializable]
    public class Script : Model
    {
        [Link] Clock Clock;
        [Link] Fertiliser Fertiliser;
        [Link] Summary Summary;
        
        
        [Description("Amount of fertiliser to be applied (kg/ha)")]
        public double Amount { get; set;}
        
        [Description("Crop to be fertilised")]
        public string CropName { get; set;}
        
        
        

        [EventSubscribe("Sowing")]
        private void OnSowing(object sender, EventArgs e)
        {
            Model crop = sender as Model;
            if (crop.Name.ToLower()==CropName.ToLower())
                Fertiliser.Apply(Amount: Amount, Type: Fertiliser.Types.NO3N);
        }
        
    }
}
```
      Manager Harvest
```csharp
using System;
using Models.Core;
using Models.PMF;
using Models.Soils;
using Models.Soils.Nutrients;
using Models.Utilities;
using APSIM.Shared.Utilities;

namespace Models
{
    [Serializable]
    public class Script : Model
    {
        [Link] Plant Wheat;

        [EventSubscribe("DoManagement")]
        private void OnDoManagement(object sender, EventArgs e)
        {
            if (Wheat.IsReadyForHarvesting)
            {
               Wheat.Harvest();
               Wheat.EndCrop();    
            }
        
        }
        
    }
}
```
      MinimumFunction Humidity9am
        ExpressionFunction RH: Expression=(([Weather].VP*0.1)/es)*100
          ExpressionFunction es: Expression=6.1078*exp((17.269*Temp9am)/(273.3+Temp9am))*0.1
            ExpressionFunction Temp9am: Expression=[Weather].MinT+(T_diff*t_fract)
              Constant t_fract: FixedValue=0.77345
              SubtractFunction T_diff
                ExternalVariable maxt: VariableName=[Weather].MaxT
                ExternalVariable mint: VariableName=[Weather].MinT
            Memo
              EccelE, 2012 Meteorol. Appl. 19: 118–128 (2012) p.120:

              es = saturation water vapour pressure.  Calculated by a common empirical interpolation function (see, e.g., WMO, 1979; Holbo, 1981

              es = 6.1078 * exp (17.269 (T /(T + 237.3))
        Constant maximum: FixedValue=100
        Memo
          EccelE, 2012 Meteorol. Appl. 19: 118–128 (2012) p.120:

          Relative humidity can be expressed as the ratio between actual water vapour and saturation vapour, which is, in turn, a pure function of temperature:

          RH = 100*(e/es)

          where e = actual water vapour pressure

          and   es=  saturation water vapour pressure.
      LifeCycle: InitialPopulation=[100]; LogSummary=false
        LifeStage Spore
          LifeStageProcess TransToInfective: ProcessAction=0; TransferTo=Infective
            ExpressionFunction transfer: Expression=LAIPresent*RainOccurred
              LinearInterpolationFunction LAIPresent: XProperty=[Wheat].Leaf.LAI
                XYPairs: X=[-1, 0, 0.0001, 1]; Y=[0, 0, 1, 1]
              LinearInterpolationFunction RainOccurred: XProperty=[Weather].Rain
                XYPairs: X=[0, 1, 1.59, 1.6, 10]; Y=[0, 0, 0, 1, 1]
        LifeStage Infective
          LifeStageProcess TransferToLesion: ProcessAction=0; TransferTo=Lesion
            ExpressionFunction: Expression=HourlyMean*Humidity
              AirTemperatureFunction HourlyMean
                XYPairs: X=[0, 5, 7, 10, 12, 15, 18]; Y=[0.75, 0.88, 0.98, 1, 0.87, 0.3, 0]
                Memo
                  Data based on the

                   Response surface generated from the equation I = - 355'14 + 0-99T + 1'64T' -0'11 T' +292'99 (In W)- 48'26 (In W)"-1 '5sT-(In W), where I = infection (%), T = temperature (0C) and W = wet period (h). Negative 1= O.

                  Assumtion 12 hours of leaf wetness if rain previous day and humidity at 85% at 9am

                  DENNIS  Trans. Br. mycol. Soc. 88 (1), (1987)
              LinearInterpolationFunction Humidity: XProperty=[Humidity9am]
                XYPairs: X=[0, 69.99, 70, 100]; Y=[0, 0, 1, 1]
        LifeStage Lesion
          LifeStageProcess AgeMortality: ProcessAction=2
            ExpressionFunction (disabled): Expression=1-(
              LinearInterpolationFunction AgeDays: XProperty=[Lesion].CurrentCohort.PhenoAge
                XYPairs: X=[1, 11.99, 12, 15]; Y=[0, 0, 1, 1]
            LinearInterpolationFunction AgeDays: XProperty=[Lesion].CurrentCohort.PhenoAge
              XYPairs: X=[1, 11.99, 12, 15]; Y=[0, 0, 1, 1]
          LifeStageProcess lesionGrowth: ProcessAction=1
            ExpressionFunction growth: Expression=PopValue*rate
              Constant rate: FixedValue=0.02
              ExternalVariable PopValue: VariableName=[Lesion].TotalPopulation
              MinimumFunction
                ExternalVariable CohortAge: VariableName=[Lesion].CurrentCohort.PhenoAge
                Constant MaxAge: FixedValue=12
        AddFunction accum
          ExternalVariable V1: VariableName=[LifeCycle].accum
          ExternalVariable V2: VariableName=[Lesion].lesionGrowth.growth
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