Simulations: Version=70
  Simulation
    Clock: Start=2016-06-04; End=2016-12-31
    Summary SummaryFile
    Weather
      FileName=W:\work\DH\INRAeLinkage\APSIM_X_Disease\APSIM_X_Disease\met\20°C.met
    SoilArbitrator
    Zone Field: Area=1; Slope=0; AspectAngle=0; Altitude=50
      Report: EventNames=[Clock].EndOfDay
        VariableNames:
          [Clock].Today
          [Clock].Today.DayOfYear
          [Wheat].Phenology.Zadok.Stage
          [Wheat].Phenology.CurrentStageName
          [Wheat].AboveGround.Wt
          [Weather].Rain
          [Humidity9am].RH
          [LifeCycle].Spore.SporeImmigration.Constant
          [LifeCycle].Spore.Mortality
          [LifeCycle].Spore.TotalPopulation
          [LifeCycle].Infective.Mortality
          [LifeCycle].Infective.TotalPopulation
          [LifeCycle].Lesion.TotalPopulation
      Report spore: EventNames=[Clock].EndOfDay
        VariableNames:
          [Clock].Today
          [Clock].Today.DayOfYear
          [Wheat].AboveGround.Wt
          [Weather].Rain
          [LifeCycle].Spore.SporeImmigration.Constant
          [LifeCycle].Spore.EstablishmentMortality.LAISwitch
          [LifeCycle].Spore.ContinuousMortality.MortalityFunction
          [LifeCycle].Spore.Mortality
          [LifeCycle].Spore.TotalPopulation
          [LifeCycle].Spore.TransferToInfective.Transfer
          [LifeCycle].Infective.TotalPopulation
          [LifeCycle].Spore.TransferToInfective.Transfer
      Report Infective: EventNames=[Clock].EndOfDay
        VariableNames:
          [Clock].Today
          [Clock].Today.DayOfYear
          [Wheat].AboveGround.Wt
          [Weather].Rain
          [Humidity9am].RH
          [LifeCycle].Infective.TotalPopulation
          [LifeCycle].Infective.CohortCount
          [LifeCycle].Infective.Mortality
          [LifeCycle].Infective.EstablishmentMortality.EstablishmentMortalityFunction
          [LifeCycle].Infective.ContinuousMortality.ContinuousMortalityFunction
          [LifeCycle].Infective.CurrentCohort.PhysiologicalAge
          [LifeCycle].Lesion.TotalPopulation
      Report Lesion: EventNames=[Clock].EndOfDay
        VariableNames:
          [Clock].Today
          [Clock].Today.DayOfYear
          [Wheat].Leaf.LAI
          [LifeCycle].Lesion.LESA.Constant
          [LifeCycle].Lesion.ProportionLeafDisease
          [LifeCycle].Lesion.TotalPopulation
          [LifeCycle].Lesion.LESA.LesionArea
      Fertiliser
      Soil: ASCOrder=Vertosol; ASCSubOrder=Black; SoilType=Clay; Site=Norwin; NearestTown=Norwin; Region=Darling Downs and Granite Belt; State=Queensland; Country=Australia; NaturalVegetation=Qld. Bluegrass, possible Qld. Blue gum; ApsoilNumber=900; Latitude=-27.581836; Longitude=151.320206; LocationAccuracy=+/- 20m
        DataSource=CSIRO Sustainable Ecosystems, Toowoomba; Characteriesd as part of the GRDC funded project"Doing it better, doing it smarter, managing soil water in Australian agriculture' 2011
        Comments=OC, CLL for all crops estimated-based on Bongeen Mywybilla Soil No1
        Physical
          Thickness  BD       AirDry    LL15      DUL       SAT       KS
          150        1.01056  0.13025   0.2605    0.521     0.588655  20
          150        1.07146  0.198689  0.248362  0.496723  0.565677  20
          300        1.09394  0.28      0.28      0.488438  0.557193  20
          300        1.15861  0.28      0.28      0.480297  0.532787  20
          300        1.17301  0.28      0.28      0.471584  0.527354  20
          300        1.16287  0.28      0.28      0.457071  0.53118   20
          300        1.1875   0.28      0.28      0.452332  0.521888  20
          SoilCrop WheatSoil: LL=[0.261, 0.248, 0.28, 0.306, 0.36, 0.392, 0.446]; KL=[0.06, 0.06, 0.06, 0.04, 0.04, 0.02, 0.01]; XF=[1, 1, 1, 1, 1, 1, 1]
        SoilWater: SummerDate=1-Nov; SummerU=5; SummerCona=5; WinterDate=1-Apr; WinterU=5; WinterCona=5; DiffusConst=40; DiffusSlope=16; Salb=0.12; CN2Bare=73; CNRed=20; CNCov=0.8; max_pond=0; Thickness=[150, 150, 300, 300, 300, 300, 300]; SWCON=[0.3, 0.3, 0.3, 0.3, 0.3, 0.3, 0.3]; PrecipitationInterception=0
        Organic: FOMCNRatio=40
          Thickness  Carbon  SoilCNRatio  FBiom  FInert  FOM
          150        1.2     12           0.04   0.4     347.129
          150        0.96    12           0.02   0.6     270.344
          300        0.6     12           0.02   0.8     163.972
          300        0.3     12           0.02   1       99.4541
          300        0.18    12           0.01   1       60.322
          300        0.12    12           0.01   1       36.5871
          300        0.12    12           0.01   1       22.1912
        Chemical
          Thickness  NO3N  NH4N  PH
          150        1     0.1   8
          150        1     0.1   8
          300        1     0.1   8
          300        1     0.1   8
          300        1     0.1   8
          300        1     0.1   8
          300        1     0.1   8
        InitialWater: PercentMethod=1; FractionFull=1
        Sample InitialN: Thickness=[150, 150, 300, 300, 300, 300, 300]; SWUnits=Volumetric; OCUnits=Total; PHUnits=Water
        CERESSoilTemperature
        Nutrient
          DirectedGraphInfo={Nodes=[{Name=Inert, OutlineColour=Black}, {Name=SurfaceResidue, OutlineColour=Black}, {Name=FOMLignin, OutlineColour=Black}, {Name=FOMCellulose, OutlineColour=Black}, {Name=FOMCarbohydrate, OutlineColour=Black}, {Name=Microbial, OutlineColour=Black}, {Name=Humic, OutlineColour=Black}, {Name=Urea, OutlineColour=Black}, {Name=NO3, OutlineColour=Black}, {Name=NH4, OutlineColour=Black}, {Name=Atmosphere, OutlineColour=White}, {Name=PlantAvailableNO3, OutlineColour=Black}, {Name=PlantAvailableNH4, OutlineColour=Black}], Arcs=[{SourceName=SurfaceResidue, DestinationName=Microbial}, {SourceName=SurfaceResidue, DestinationName=Humic}, {SourceName=FOMLignin, DestinationName=Microbial}, {SourceName=FOMLignin, DestinationName=Humic}, {SourceName=FOMCellulose, DestinationName=Microbial}, {SourceName=FOMCellulose, DestinationName=Humic}, {SourceName=FOMCarbohydrate, DestinationName=Microbial}, {SourceName=FOMCarbohydrate, DestinationName=Humic}, {SourceName=Microbial, DestinationName=Microbial}, {SourceName=Microbial, DestinationName=Humic}, {SourceName=Humic, DestinationName=Microbial}, {SourceName=Urea, DestinationName=NH4}, {SourceName=NO3, DestinationName=Atmosphere}, {SourceName=NH4, DestinationName=NO3}]}
      SurfaceOrganicMatter: InitialResidueName=wheat_stubble; InitialResidueType=wheat; InitialResidueMass=500; InitialStandingFraction=0; InitialCPR=0; InitialCNR=100; FractionFaecesAdded=0.5
      Plant Wheat: CropType=Wheat; IsEnding=false; DaysAfterEnding=0
      MicroClimate: a_interception=0; b_interception=1; c_interception=0; d_interception=0; soil_albedo=0.3; SoilHeatFluxFraction=0.4; NightInterceptionFraction=0.5; ReferenceHeight=2
      Manager SowingFertiliser
        Amount = 160
        CropName = wheat
```csharp
using System;
using Models.Core;
using Models.PMF;
namespace Models
{
    [Serializable]
    public class Script : Model
    {
        [Link] Clock Clock;
        [Link] Fertiliser Fertiliser;
        [Link] Summary Summary;
        
        
        [Description("Amount of fertiliser to be applied (kg/ha)")]
        public double Amount { get; set;}
        
        [Description("Crop to be fertilised")]
        public string CropName { get; set;}
        
        
        

        [EventSubscribe("Sowing")]
        private void OnSowing(object sender, EventArgs e)
        {
            Model crop = sender as Model;
            if (crop.Name.ToLower()==CropName.ToLower())
                Fertiliser.Apply(Amount: Amount, Type: Fertiliser.Types.NO3N);
        }
        
    }
}
```
      Manager Harvest
```csharp
using System;
using Models.Core;
using Models.PMF;
using Models.Soils;
using Models.Soils.Nutrients;
using Models.Utilities;
using APSIM.Shared.Utilities;

namespace Models
{
    [Serializable]
    public class Script : Model
    {
        [Link] Plant Wheat;

        [EventSubscribe("DoManagement")]
        private void OnDoManagement(object sender, EventArgs e)
        {
            if (Wheat.IsReadyForHarvesting)
            {
               Wheat.Harvest();
               Wheat.EndCrop();    
            }
        
        }
        
    }
}
```
      Manager SowingRule1
        StartDate = 1-may
        EndDate = 10-jul
        MinESW = 100
        MinRain = 25
        RainDays = 7
        CultivarName = Hartog
        SowingDepth = 30
        RowSpacing = 250
        Population = 120
```csharp
using System;
using Models.Core;
using Models.PMF;
using Models.Soils;
using Models.Soils.Nutrients;
using Models.Utilities;
using APSIM.Shared.Utilities;

namespace Models
{
    [Serializable]
    public class Script : Model
    {
        [Link] Clock Clock;
        [Link] Fertiliser Fertiliser;
        [Link] Summary Summary;
        [Link] Plant Wheat;
        [Link] Soil Soil; 
        Accumulator accumulatedRain;
        
        [Description("Start of sowing window (d-mmm)")]
        public string StartDate { get; set;}
        [Description("End of sowing window (d-mmm)")]
        public string EndDate { get; set;}
        [Description("Minimum extractable soil water for sowing (mm)")]
        public double MinESW { get; set;}
        [Description("Accumulated rainfall required for sowing (mm)")]
        public double MinRain { get; set;}
        [Description("Duration of rainfall accumulation (d)")]
        public int RainDays { get; set;}
        [Description("Cultivar to be sown")]
        [Display(Type=DisplayType.CultivarName)]
        public string CultivarName { get; set;}
        [Description("Sowing depth (mm)")]
        public double SowingDepth { get; set;}        
        [Description("Row spacing (mm)")]
        public double RowSpacing { get; set;}    
        [Description("Plant population (/m2)")]
        public double Population { get; set;}    
        
        
        [EventSubscribe("Commencing")]
        private void OnSimulationCommencing(object sender, EventArgs e)
        {
            accumulatedRain = new Accumulator(this, "[Weather].Rain", RainDays);
        }
        

        [EventSubscribe("DoManagement")]
        private void OnDoManagement(object sender, EventArgs e)
        {
            accumulatedRain.Update();
            
            if (DateUtilities.WithinDates(StartDate,Clock.Today,EndDate) &&
                !Wheat.IsAlive &&
                MathUtilities.Sum(Soil.SoilWater.ESW) > MinESW &&
                accumulatedRain.Sum > MinRain)
            {
               Wheat.Sow(population:Population, cultivar:CultivarName, depth:SowingDepth, rowSpacing:RowSpacing);    
            }
        
        }
        
    }
}
```
      MinimumFunction Humidity9am
        ExpressionFunction RH: Expression=(([Weather].VP*0.1)/es)*100
          ExpressionFunction es: Expression=6.1078*exp((17.269*Temp9am)/(273.3+Temp9am))*0.1
            ExpressionFunction Temp9am: Expression=[Weather].MinT+(T_diff*t_fract)
              Constant t_fract: FixedValue=0.77345
              SubtractFunction T_diff
                ExternalVariable maxt: VariableName=[Weather].MaxT
                ExternalVariable mint: VariableName=[Weather].MinT
            Memo
              EccelE, 2012 Meteorol. Appl. 19: 118–128 (2012) p.120:

              es = saturation water vapour pressure.  Calculated by a common empirical interpolation function (see, e.g., WMO, 1979; Holbo, 1981

              es = 6.1078 * exp (17.269 (T /(T + 237.3))
        Constant maximum: FixedValue=100
        Memo
          EccelE, 2012 Meteorol. Appl. 19: 118–128 (2012) p.120:

          Relative humidity can be expressed as the ratio between actual water vapour and saturation vapour, which is, in turn, a pure function of temperature:

          RH = 100*(e/es)

          where e = actual water vapour pressure

          and   es=  saturation water vapour pressure.
      LifeCycle: InitialPopulation=[1]; LogSummary=false
        LifeStage Spore
          LifeStageImmigrationProcess SporeImmigration
            Constant: FixedValue=1000
          LifeStageProcess EstablishmentMortality: ProcessAction=2
            LinearInterpolationFunction LAISwitch: XProperty=[Wheat].Leaf.LAI
              XYPairs: X=[-1, 0, 0.001, 1]; Y=[1, 1, 0, 0]
          LifeStageProcess ContinuousMortality: ProcessAction=2
            ExpressionFunction MortalityFunction
              Expression=1-(1-dailyMortRate)*(1-MaxTemp)*(1-MinTemp)*(1-GSinducedMortality)
              Constant dailyMortRate: FixedValue=0.5
              LinearInterpolationFunction MaxTemp: XProperty=[Weather].MaxT
                XYPairs: X=[0, 30, 35]; Y=[0, 0, 1]
              LinearInterpolationFunction MinTemp: XProperty=[Weather].MinT
                XYPairs: X=[-2, -1, 0, 30]; Y=[1, 0.5, 0, 0]
              LinearInterpolationFunction GSinducedMortality: XProperty=[Wheat].Phenology.Zadok.Stage
                XYPairs: X=[0, 89, 90, 100]; Y=[0, 0, 0.5, 0.5]
          LifeStageProcess TransferToInfective: ProcessAction=0; TransferTo=Infective
            ExpressionFunction Transfer: Expression=LeafWetness*LAISwitch
              LinearInterpolationFunction LAISwitch: XProperty=[Wheat].Leaf.LAI
                XYPairs: X=[-1, 0, 0.001, 1]; Y=[0, 0, 1, 1]
              LinearInterpolationFunction LeafWetness: XProperty=[Weather].Rain
                XYPairs: X=[0, 1.59, 1.6, 10]; Y=[0, 0, 1, 1]
        LifeStage Infective
          LifeStageProcess EstablishmentMortality: ProcessAction=2
            ExpressionFunction EstablishmentMortalityFunction: Expression=1-(1-LAISwitch)*(1-MortalityDueToResistance)
              LinearInterpolationFunction LAISwitch: XProperty=[Wheat].Leaf.LAI
                XYPairs: X=[-1, 0, 0.001, 1]; Y=[1, 1, 0, 0]
              LinearInterpolationFunction MortalityDueToResistance: XProperty=ResistanceRating
                XYPairs: X=[0, 1, 4, 12.1]; Y=[0.99, 0.9, 0.81, 0]
                Constant ResistanceRating: FixedValue=2; Units=ResistanceRating
          LifeStageProcess ContinuousMortality: ProcessAction=2
            ExpressionFunction ContinuousMortalityFunction: Expression=1-(1-LAISwitch)*(1-Moisture9am)*(1-GSinducedMortality)
              LinearInterpolationFunction LAISwitch: XProperty=[Wheat].Leaf.LAI
                XYPairs: X=[-1, 0, 0.001, 1]; Y=[1, 1, 0, 0]
              LinearInterpolationFunction Moisture9am: XProperty=[Field].Humidity9am
                XYPairs: X=[0, 20, 50, 69.9, 70, 80, 100]; Y=[1, 1, 1, 1, 1, 0, 0]
              LinearInterpolationFunction GSinducedMortality: XProperty=[Wheat].Phenology.Zadok.Stage
                XYPairs: X=[0, 89.9, 90, 100]; Y=[0, 0, 1, 1]
          LifeStageProcess PhenoAge: ProcessAction=1; TransferTo=Lesion
            AirTemperatureFunction
              XYPairs: X=[0, 5, 15, 25, 30]; Y=[0, 0, 0.2, 0.4, 0]
          LifeStageProcess Maturing: ProcessAction=0; TransferTo=Lesion
            LinearInterpolationFunction TransferToLesion: XProperty=[LifeCycle].Infective.CurrentCohort.PhysiologicalAge
              XYPairs: X=[0, 0.99, 1, 2]; Y=[0, 0, 1, 1]
              Memo
                Step function describing transfer to adult for Pseaudo-Aphid model

                DYMEX tutorial

                1.	Sutherst RW, Maywald GF. DYMEX modelling workshops: a national, collaborative approach to pest risk analysis and IPM in Australia. Pest Management—Future Challenges. 1998;2:57-62.
        LifeStage Lesion
          Constant LeafExpansionCon: FixedValue=0.04
            Memo
              see Table 1
              LE cm^2 per day. min=0.01 max 0.2  default = 0.04
              Most susceptible cv in Lou and Zeng (1995) was 0.19
          Constant LesionRateModifyer: FixedValue=0.04
            Memo
              The more negative the paramter the greater effect ppn of leaf diseased has on the ability of the lesion to grow
          ExpressionFunction LesionExpansionRate
          ExpressionFunction ProportionLeafDisease: Expression=[LifeCycle].Lesion.LESA.Constant/[Wheat].Leaf.LAI
          LifeStageProcess LESA: ProcessAction=1
            Constant: FixedValue=0.02
            ExpressionFunction LesionArea: Expression=LAIAvailable
              MaximumFunction LAIAvailable
                ExternalVariable WheatleafArea: VariableName=[Wheat].Leaf.LAI
                Constant: FixedValue=0
  DataStore
  Simulation Simulation1
    Clock: Start=2016-06-04; End=2016-12-31
    Summary SummaryFile
    Weather
      FileName=W:\work\DH\INRAeLinkage\APSIM_X_Disease\APSIM_X_Disease\met\20°C.met
    SoilArbitrator
    Zone Field: Area=1; Slope=0; AspectAngle=0; Altitude=50
      Report: same as Simulation.Field.Report
      Report spore: same as Simulation.Field.spore
      Report Infective: same as Simulation.Field.Infective
      Report Lesion: EventNames=[Clock].EndOfDay
        VariableNames:
          [Clock].Today
          [Clock].Today.DayOfYear
          [Wheat].Leaf.LAI
          [LifeCycle].Lesion.LESA.Constant
          [LifeCycle].Lesion.ProportionLeafDisease
          [LifeCycle].Lesion.TotalPopulation
          [LifeCycle].Lesion.LESA.LesionArea
      Fertiliser
      Soil: same as Simulation.Field.Soil
      SurfaceOrganicMatter: InitialResidueName=wheat_stubble; InitialResidueType=wheat; InitialResidueMass=500; InitialStandingFraction=0; InitialCPR=0; InitialCNR=100; FractionFaecesAdded=0.5
      Plant Wheat: CropType=Wheat; IsEnding=false; DaysAfterEnding=0
      MicroClimate: a_interception=0; b_interception=1; c_interception=0; d_interception=0; soil_albedo=0.3; SoilHeatFluxFraction=0.4; NightInterceptionFraction=0.5; ReferenceHeight=2
      Manager SowingFertiliser: same as Simulation.Field.SowingFertiliser
      Manager Harvest: same as Simulation.Field.Harvest
      Manager SowingRule1: same as Simulation.Field.SowingRule1
      MinimumFunction Humidity9am: same as Simulation.Field.Humidity9am
      LifeCycle: LogSummary=false
        LifeStage Spore
          LifeStageProcess: ProcessAction=0; TransferTo=[LifeCycle].Infective
            ExpressionFunction TransferToLesion: Expression=LAIPresent*
              LinearInterpolationFunction LAIPresent: XProperty=[Wheat].Leaf.LAI
                XYPairs: X=[-1, 0.99, 1, 10]; Y=[0, 0, 1, 1]
              LinearInterpolationFunction RainOccurred: XProperty=[Weather].Rain*RainOccurred
                XYPairs: X=[0, 1, 1.59, 1.6, 10]; Y=[0, 0, 0, 1, 1]
        LifeStage Infective
          LifeStageProcess: ProcessAction=0
        LifeStage Lesion
          LifeStageProcess: ProcessAction=0
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